## Snow Loads
# Design According to ASCE7-05 Chapter 7
# Ground Snow Load
p_g := 25*psf
# Building Category
Cat := "III"  # (Table 1-1)
# Exposure Factor
C_e := 1.1  # (Table 7-2)
# Thermal Factor
C_t := 1.2
# (Figure 7-3)
I_s := if(Cat == "I", 0.8, if(Cat == "II", 1.0, if(Cat == "III", 1.1, 1.2)))
# Wind Importance Factor
I_s = 1.1  # (Table 7-4)
# Roof Slope Factor
C_s := 1.0  # (Fig. 7-2)
# Windward Drift Length
l_uw := 25 ft
c := psf^-0.25*ft^(2/3)
# Leeward Drift Length
l_ul := 35 ft
# Parapit Height
PAR := 0 ft
a := ft^-1
# (Eq. 7-1)
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# Flat Roof Snow Load
p_f := 0.7*C_e*C_t*I_s*p_g = 25.41 pounds_per_sq_foot
# Minimum Flat Roof Snow Load
p_fmin := if(p_g ≤ 20 psf, I_s*p_g, 20 psf*I_s) = 22 pounds_per_sq_foot  # (Sect. 7.3)
# (pf for Low-Sloped Roofs, See ASCE Section 7.3.4 to see where minimum values on apply)
# Rain-On-Snow Surcharge Load
ROS := if(p_g ≤ 20 psf, 5 psf, 0 psf) = 0 pounds_per_sq_foot  # (Sect. 7.10)
# (ROS for Low-Sloped Roofs, See ASCE Section 7.10 to see where Rain-On-Snow Surchage Loads apply)
p_g*I_s = 27.5 pounds_per_sq_foot
# Uniform Snow Load
SL_unif := max(p_f, p_fmin) = 25.41 pounds_per_sq_foot
# Uniform Snow Load with Rain
SL_ROS := SL_unif + ROS = 25.41 pounds_per_sq_foot
# Drifts on Lower Roofs (Aerodynamic Shade) per ASCE7 Section 7.7
# Windward Drift Height
# c = constant for unit cancelation
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h_dwind := (0.43*c*nthroot(l_uw, 3)*nthroot((p_g + 10*psf), 4) - 1.5 ft)*0.75 = 1.16865 ft  # (Figure 7-9)
# (Note use 3/4 of Drift Height for windward drifts per Section 7.7.1)
# Leeward Drift Height | c = constant for unit cancelation
h_dlee := (0.43*c*nthroot(l_ul, 3)*nthroot((p_g + 10*psf), 4) - 1.5 ft) - PAR = 1.92117 ft  # (Figure 7-9)
# Snow Density
γ := 0.13*p_g*a + 14 pcf = 17.25 pounds_per_cubic_foot  # (Eq. 7-3)
# a = constant for unit cancelation
# Drift Surcharge Load
h_d := max(h_dwind, h_dlee) = 1.92117 ft
p_d := h_d*γ = 33.1402 pounds_per_sq_foot
# Total Drift Load
SL_drift := p_d + SL_unif = 58.5502 pounds_per_sq_foot
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# Drift Length
w := 4*max(h_dwind, h_dlee) = 7.68469 ft
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SL_drift = 58.5502 pounds_per_sq_foot
SL_unif = 25.41 pounds_per_sq_foot
w = 7.68469 ft
SL_ROS = 25.41 pounds_per_sq_foot
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# Snow Drift at Various Point From the End
Length := 65 in
SL_dist := if(Length < w, SL_drift - ((p_d/w)*Length), SL_unif) = 35.1908 pounds_per_sq_foot  # SL with Uniform Load
DriftHeight := SL_dist*γ^-1 = 2.04005 ft  # Drift Height with Uniform Load
UniformHeight := SL_unif*γ^-1 = 1.47304 ft  # Height of Uniform Snow
DriftHeight2 := if(Length < w, h_d - ((h_d/w)*Length), 0) = 0.567005 ft  # Drift Height without Unif. Load
SL_driftLength := SL_dist - SL_unif = 9.78083 pounds_per_sq_foot  # Snow Load without Unif. Load
