# Glass Design for Simple Span Beam
# Glass Thicknesses E1300
# 1/8"  3mm  0.115
# 5/32"  3mm  0.149
# 3/16"  5mm  0.180
# 1/4"  6mm  0.219
# 5/16"  8mm  0.292
# 3/8"  10mm  0.355
# 1/2"  12mm  0.469
# 5/8"  16mm  0.595
# 3/4"  19mm  0.719
# Glass Thickness
t_g1 := 0.643 in
t_g2 := 0.643 in
# Span
L := 13 ft
# Load
P := 0.7*20.5*psf
w := 12 in*P = 14.35 lbf/ft
# Modulus of Elasticity
E := 10400000 psi
# Load Share
LS1 := t_g1^3/(t_g1^3 + t_g2^3) = 0.5
LS2 := t_g2^3/(t_g1^3 + t_g2^3) = 0.5
# Moment of Inertia
I_g1 := 12 in*t_g1^3/12 = 0.265848 in^4
I_g2 := 12 in*t_g2^3/12 = 0.265848 in^4
# Glass Deflection
Δ_g1 := 5*LS1*w*L^4/(384*E*I_g1) = 1.66768 in
Δ_g2 := 5*LS2*w*L^4/(384*E*I_g2) = 1.66768 in
L/Δ_g1 = 93.5434
L/Δ_g2 = 93.5434
# Moment in Glass
M_g1 := LS1*w*L^2/8 = 1.81886 kip*in
M_g2 := LS2*w*L^2/8 = 1.81886 kip*in
# Stress in Glass
σ_1 := M_g1*0.5*t_g1/I_g1 = 2199.62 psi
σ_2 := M_g2*0.5*t_g2/I_g2 = 2199.62 psi
# Allowable Stress in Glass (Edge Stress) 8/1000, 3sec Load Duration
# Annealed Glass
σ_AllowAN := 2650 psi  # Seamed Edges
# Heat Strengthened Glass
σ_AllowHS := 5300 psi
# Fully Tempered Glass
σ_AllowFT := 10600 psi
# Allowable Stress in Glass (Edge Stress) 8/1000, 3sec Load Duration For IGU's
# Annealed Glass
σ_AllowANigu := 2650 psi*0.9 = 2385 psi
# Heat Strengthened Glass
σ_AllowHSigu := 2650 psi*1.8 = 4770 psi
# Fully Tempered Glass
σ_AllowFTigu := 2650 psi*3.6 = 9540 psi
