# Glass Design for Simple Span Beam
# Glass Thicknesses E1300
# 1/8"  3mm  0.115
# 5/32"  3mm  0.149
# 3/16"  5mm  0.180
# 1/4"  6mm  0.219
# 5/16"  8mm  0.292
# 3/8"  10mm  0.355
# 1/2"  12mm  0.469
# 5/8"  16mm  0.595
# 3/4"  19mm  0.719
# Glass Thickness
t_g1 := 1.08 in
# Span
L := 10 ft = 3048 mm
# Load
P := 45 psf
w := 12 in*P = 45 lbf/ft
# Modulus of Elasticity
E := 10400000 psi
# Moment of Inertia
I_g1 := 12 in*t_g1^3/12 = 1.25971 in^4
# Glass Deflection
Δ_g1 := 5*w*L^4/(384*E*I_g1) = 0.772841 in
L/Δ_g1 = 155.271
# Moment in Glass
M_g1 := w*L^2/8 = 6.75 kip*in
# Stress in Glass
σ_1 := M_g1*0.5*t_g1/I_g1 = 2893.52 psi  # Limit is 2,900 psi (edge stress)
# teff = 1.08 in for Anealed (Edge Stress Controlled)
# Glass Thickness
t_g1 := 0.94 in
# Span
L := 10 ft = 3048 mm
# Load
P := 45 psf
w := 12 in*P = 45 lbf/ft
# Modulus of Elasticity
E := 10400000 psi
# Moment of Inertia
I_g1 := 12 in*t_g1^3/12 = 0.830584 in^4
# Glass Deflection
Δ_g1 := 5*w*L^4/(384*E*I_g1) = 1.17214 in
L/Δ_g1 = 102.377
# Moment in Glass
M_g1 := w*L^2/8 = 6.75 kip*in
# Stress in Glass
σ_1 := M_g1*0.5*t_g1/I_g1 = 3819.6 psi  # Limit is 5,300 psi (edge stress)
# teff = 0.94 for HS or FT Glass (L/100 Deflection Controlled)
