# Ice Loads According to ASCE7-10 Chapter 10
# Nominal Ice Thickness
t := 0.25 in  # (Figure 10-2)  # REVISION HISTORY:
# 1) Made by John who knows when (probably in prehistoric ages)
# 2) Reviewed by JC, 3/1/2017
# Wind Speed without Ice
V := 115 mph  # (Figure 10-2)
# Wind Speed Concurrent with Ice
V_c := 40 mph
# Wind Force Coefficient with Ice
C_fi := 1.95
# Wind Force Coefficient without Ice
C_f := 1.95
# Importance Factor
I_i := 1.0  # (Table 1.5-2)
# Height Above Ground
z := 341 ft
# Topographical Factor
K_zt := 1.0  # (Fig. 26.8-1)
# Diameter of Cylinder Circumscribing an Object
D_c := 8.02 in  # (Fig. 10-1)
# Ice Density
γ := 56 pcf  # (Sec. 10.4.1)
# Height Factor
f_z := if(z > 900 ft, 1.4, (z/(33 ft))^0.10) = 1.26306  # (Eq. 10.4-4)
# Design Ice Thickness for Freezing Rain
t_d := 2.0*t*I_i*f_z*K_zt^0.35 = 0.63153 in  # (Eq. 10.4-5)
# Cross Sectional Area of Ice on a Prismatic Member
A_i := π*t_d*(D_c + t_d) = 17.1647 in^2  # (Eq. 10.4-1)
# Unit Ice Weight on Member
D_i := A_i*γ = 6.67517 lbf/ft
# Projected Width of Member for Wind Loading
w := D_c + 2*t_d = 9.28306 in
# Increase/Decrease in Unit Wind Load
f := w/D_c*(V_c^2/V^2)*(C_fi/C_f) = 0.140036
# Note:  Scale wind load without ice by f to get the wind load with ice Wi.
# Load Combinations with Ice (ASD)
# (per ASCE7 2.4.3)
# 1.)  D + L + 0.7 Di
# 2.)  D + 0.7 Di + 0.7 Wi + S
# 3.)  0.6D + 0.7 Di + 0.7 Wi
