psf := 1.0
mph := 1.0
ft := 1.0
g := 1.0
I := 1
II := 2
III := 3
IV := 4
A := 1
C := 3
B := 2
D := 4
E := 5
## Seismic Design Requirements for Nonstructural Components
Fa_E := [2.5, 2.5, 1.7, 1.2, 0.9, 0.9, 0.9]
# Design According to ASCE7-10 Chapter 13
SsTable := [0, 0.25, .5, .75, 1.0, 1.25, 10]
Fa_A := [0.8, 0.8, 0.8, 0.8, 0.8, 0.8, 0.8]
Fa_B := [1.0, 1.0, 1.0, 1.0, 1.0, 1.0, 1.0]
Fa_C := [1.2, 1.2, 1.2, 1.1, 1.0, 1.0, 1.0]
Fa_D := [1.6, 1.6, 1.4, 1.2, 1.1, 1.0, 1.0]
# MCE Spectral Response Acceleration at Short Period
S_s := 0.126*g
S1Table := [0, 0.1, 0.2, 0.3, 0.4, 0.5, 10]
Fv_A := [0.8, 0.8, 0.8, 0.8, 0.8, 0.8, 0.8]
Fv_B := [1.0, 1.0, 1.0, 1.0, 1.0, 1.0, 1.0]
Fv_C := [1.7, 1.7, 1.6, 1.5, 1.4, 1.3, 1.3]
Fv_D := [2.4, 2.4, 2.0, 1.8, 1.6, 1.5, 1.5]
Fv_E := [3.5, 3.5, 3.2, 2.8, 2.4, 2.4, 2.4]
# MCE Spectral Response Acceleration at 1s Period
S_1 := 0.053*g
# Building Category
Cat := II
F_atab[0] := linterp(transpose(SsTable), transpose(Fa_A), S_s) = 0.8
F_atab[1] := linterp(transpose(SsTable), transpose(Fa_B), S_s) = 1
F_atab[2] := linterp(transpose(SsTable), transpose(Fa_C), S_s) = 1.2
F_atab[3] := linterp(transpose(SsTable), transpose(Fa_D), S_s) = 1.6
F_atab[4] := linterp(transpose(SsTable), transpose(Fa_E), S_s) = 2.5
F_vtab[0] := linterp(transpose(S1Table), transpose(Fv_A), S_1) = 0.8
F_vtab[1] := linterp(transpose(S1Table), transpose(Fv_B), S_1) = 1
F_vtab[2] := linterp(transpose(S1Table), transpose(Fv_C), S_1) = 1.7
F_vtab[3] := linterp(transpose(S1Table), transpose(Fv_D), S_1) = 2.4
F_vtab[4] := linterp(transpose(S1Table), transpose(Fv_E), S_1) = 3.5
# Site Class
Site := C
SiteTable := [A; B; C; D; E]
# Component Importance Factor
F_aX := lookup(Site, SiteTable, F_atab) = [1.2]
F_a := F_aX[0]
F_vX := lookup(Site, SiteTable, F_vtab) = [1.7]
F_v := F_vX[0]
I_p := 1.0  # (Sect. 13.1.3)
# Site Coefficient
F_a = 1.2  # (Table 11.4-1)
# Site Coefficient
F_v = 1.7  # (Table 11.4-2)
# Adjusted MCE Spect. Resp. Acc. for Short Periods
S_MS := F_a*S_s = 0.1512 gravitational_acceleration  # (Eq. 11.4-1)
# Adjusted MCE Spect. Resp. Acc. for Long Periods
S_M1 := F_v*S_1 = 0.0901 gravitational_acceleration  # (Eq. 11.4-2)
# (Eq. 11.4-3)
DL := 1.0
W_p := 1.0
# Design Spect. Resp. Acc. for Short Periods
S_DS := 2/3*S_MS = 0.1008 gravitational_acceleration
# Design Spect. Resp. Acc. for Long Periods
S_D1 := 2/3*S_M1 = 0.0600667 gravitational_acceleration
# (Eq. 11.4-4)
SDC1[1] := if(S_DS < 0.167, 1, if(0.167 ≤ S_DS < 0.33, 2, if(0.33 ≤ S_DS < 0.5, 3, 4))) = 1
SDC1[2] := if(S_DS < 0.167, 1, if(0.167 ≤ S_DS < 0.33, 2, if(0.33 ≤ S_DS < 0.5, 3, 4))) = 1
SDC1[3] := if(S_DS < 0.167, 1, if(0.167 ≤ S_DS < 0.33, 2, if(0.33 ≤ S_DS < 0.5, 3, 4))) = 1
SDC1[4] := if(S_DS < 0.167, 1, if(0.167 ≤ S_DS < 0.33, 3, if(0.33 ≤ S_DS < 0.5, 4, 4))) = 1
SDC2[1] := if(S_D1 < 0.067, 1, if(0.067 ≤ S_D1 < 0.133, 2, if(0.133 ≤ S_D1 < 0.20, 3, 4))) = 1
SDC2[2] := if(S_D1 < 0.067, 1, if(0.067 ≤ S_D1 < 0.133, 2, if(0.133 ≤ S_D1 < 0.20, 3, 4))) = 1
SDC2[3] := if(S_D1 < 0.067, 1, if(0.067 ≤ S_D1 < 0.133, 2, if(0.133 ≤ S_D1 < 0.20, 3, 4))) = 1
SDC2[4] := if(S_D1 < 0.067, 1, if(0.067 ≤ S_D1 < 0.133, 3, if(0.133 ≤ S_D1 < 0.20, 4, 4))) = 1
SDC11_6[1] := if(S_1 ≥ 0.75, 5, 0)
SDC11_6[2] := if(S_1 ≥ 0.75, 5, 0)
SDC11_6[3] := if(S_1 ≥ 0.75, 5, 0)
SDC11_6[4] := if(S_1 ≥ 0.75, 6, 0)
SDC_Sect11.6 := if(SDC11_6[Cat] == 1, "A", if(SDC11_6[Cat] == 2, "B", if(SDC11_6[Cat] == 3, "C", if(SDC11_6[Cat] == 4, "D", if(SDC11_6[Cat] == 5, "E", if(SDC11_6[Cat] == 0, "N/A", "F")))))) = "N/A"
SDC_11.6.1 := if(SDC1[Cat] == 1, "A", if(SDC1[Cat] == 2, "B", if(SDC1[Cat] == 3, "C", if(SDC1[Cat] == 4, "D", if(SDC1[Cat] == 5, "D", "F"))))) = "A"
SDC_11.6.2 := if(SDC2[Cat] == 1, "A", if(SDC2[Cat] == 2, "B", if(SDC2[Cat] == 3, "C", if(SDC2[Cat] == 4, "D", if(SDC2[Cat] == 5, "D", "F"))))) = "A"
SDCNumb := max(SDC1[Cat], SDC2[Cat], SDC11_6[Cat]) = 1
SDC := if(SDCNumb == 1, "A", if(SDCNumb == 2, "B", if(SDCNumb == 3, "C", if(SDCNumb == 4, "D", if(SDCNumb == 5, "D", "F"))))) = "A"
SDC1[Cat] = 1
SDC2[Cat] = 1
SDC11_6[Cat] = 0
# Seismic Design Category based on Table 11.6-1, 11.6-2 and Section 11.6
SDC = "A"
SDC_11.6.1 = "A"
SDC_11.6.2 = "A"
SDC_Sect11.6 = "N/A"
Note := if(SDCNumb ≤ 2 and I_p == 1, "Exempt for Architectural Componets in SDC B and Ip=1 per ASCE 13.1.4", "Must Design for Seismic Forces") = "Exempt for Architectural Componets in SDC B and Ip=1 per ASCE 13.1.4"
Note = "Exempt for Architectural Componets in SDC B and Ip=1 per ASCE 13.1.4"
# Members | Fasteners
# Component Amplification Factor
a_p[0] := 1.0
a_p[1] := 1.25  # (Tab 13.5.1)
# Component Response Modification Factor
R_p[0] := 2.5
R_p[1] := 1.0  # (Tab 13.5.1)
# Height of Attachment
z := 1*ft
# Height of Structure
h := 1*ft
# Seismic Design Force
F_p := 0.4*a_p*S_DS*W_p/(R_p/I_p)*(1 + 2*z/h) = [0.048384; 0.1512] W_p  # (Eq. 13.3-1)
# Maximum Force
F_pMax := 1.6*S_DS*I_p*W_p = 0.16128 W_p  # (Eq. 13.3-2)
# Minimum Force
F_pMin := 0.3*S_DS*I_p*W_p = 0.03024 W_p  # (Eq. 13.3-3)
# Redundancy Factor
ρ := 1.0
# For Non-Structural Components (12.3.4.1)
Q_E_Con := max(min(F_p[1], F_pMax), F_pMin)
Q_E_Memb := max(min(F_p[0], F_pMax), F_pMin)
# Horiz Earthquake Load for Members
E_h_Memb := ρ*Q_E_Memb = 0.048384 W_p  # (12.4-3)
# Horiz Earthquake Load for Connections
E_h_Con := ρ*Q_E_Con = 0.1512 W_p  # (12.4-3)
# Vertical Earthquake Load
E_v := 0.2*S_DS*DL = 0.02016 DL  # (12.4-4)
# (Note: Q_E = F_p per ASCE7 Section 12.4.2.1)
# REVISION HISTORY:
# 1) Made by John who knows when (probably in prehistoric ages)
# 2) Reviewed by JC, 3/1/2017
