## Snow Loads
# Design According to ASCE7-10 Chapter 7
c := psf^-0.25*ft^(2/3)
a := ft^-1
# Ground Snow Load
p_g := 20*psf
# Building Category
Cat := "III"
I_s := if(Cat == "I", 0.8, if(Cat == "II", 1.0, if(Cat == "III", 1.1, 1.2)))
# (Table 1.5-1)
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# Exposure Factor
C_e := 1.0  # (Table 7-2)
# Thermal Factor
C_t := 1.2  # (Table 7-3)
# Snow Importance Factor
I_s = 1.1  # (Table 1.5-2)
# Roof Slope Factor
C_s := 1.0  # (Figure 7-2)
# Windward Drift Length
l_uw := 11 ft
# Leeward Drift Length
l_ul := 0 ft
# Parapet Height
PAR := 0 ft
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# Flat Roof Snow Load
p_f := 0.7*C_e*C_t*I_s*p_g = 18.48 pounds_per_sq_foot  # (Eq. 7.3-1)
# Minimum Flat Roof Snow Load
p_fmin := if(p_g ≤ 20 psf, I_s*p_g, 20 psf*I_s) = 22 pounds_per_sq_foot  # (Sect. 7.3.4)
# (pf for Low-Sloped Roofs, See ASCE Section 7.3.4 to see where minimum values on apply)
# Rain-On-Snow Surcharge Load
ROS := if(p_g ≤ 20 psf, 5 psf, 0 psf) = 5 pounds_per_sq_foot  # (Sect. 7.10)
# (ROS for Low-Sloped Roofs, See ASCE Section 7.10 to see where Rain-On-Snow Surchage Loads apply)
p_g*I_s = 22 pounds_per_sq_foot
# Uniform Snow Load
SL_unif := max(p_f, p_fmin) = 22 pounds_per_sq_foot
# Uniform Snow Load with Rain
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SL_ROS := SL_unif + ROS = 27 pounds_per_sq_foot
# Drifts on Lower Roofs (Aerodynamic Shade) per ASCE7 Section 7.7
# Windward Drift Height | c = constant for unit cancelation
h_dwind := (0.43*c*nthroot(l_uw, 3)*nthroot((p_g + 10*psf), 4) - 1.5 ft)*0.75 = 0.553576 ft  # (Figure 7-9)
# (Note use 3/4 of Drift Height for windward drifts per Section 7.7.1)
# Leeward Drift Height | c = constant for unit cancelation
h_dlee := (0.43*c*nthroot(l_ul, 3)*nthroot((p_g + 10*psf), 4) - 1.5 ft) - PAR = -1.5 ft  # (Figure 7-9)
# Snow Density
γ := 0.13*p_g*a + 14 pcf = 16.6 pounds_per_cubic_foot  # (Eq. 7.7-1)
# a = constant for unit cancelation
# Drift Surcharge Load
h_d := max(h_dwind, h_dlee) = 0.553576 ft
p_d := h_d*γ = 9.18936 pounds_per_sq_foot
# Total Drift Load
SL_drift := p_d + SL_unif = 31.1894 pounds_per_sq_foot
# Drift Length
w := 4*max(h_dwind, h_dlee) = 2.2143 ft
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# Snow Drift at Various Point From the End
SL_drift = 31.1894 pounds_per_sq_foot
Length := 65 in
SL_dist := if(Length < w, SL_drift - ((p_d/w)*Length), SL_unif) = 22 pounds_per_sq_foot  # SL with Uniform Load
SL_unif = 22 pounds_per_sq_foot
DriftHeight := SL_dist*γ^-1 = 1.3253 ft  # Drift Height with Uniform Load
UniformHeight := SL_unif*γ^-1 = 1.3253 ft  # Height of Uniform Snow
w = 2.2143 ft
DriftHeight2 := if(Length < w, h_d - ((h_d/w)*Length), 0) = 0  # Drift Height without Unif. Load
SL_driftLength := SL_dist - SL_unif = 0 pounds_per_sq_foot  # Snow Load without Unif. Load
SL_ROS = 27 pounds_per_sq_foot  # REVISION HISTORY:
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# 1) Made by John who knows when (probably in prehistoric ages)
# 2) Reviewed by JC, 3/1/2017
