psf := 1.0
mph := 1.0
ft := 1.0
## Wind Loading for Components and Cladding
# Design According to ASCE7-10 for Solid Freestanding Walls & Solid Signs
z_gB := 1200
z_gC := 900
z_gD := 700
α_B := 7.0
α_C := 9.5
α_D := 11.5
# Basic Wind Speed
V := 115*mph
# Height of Sign off Ground
h := 30*ft
h_1 := max(15, h)
h_2 := max(15, h)
h_3 := max(15, h)
# Horizontal Dimension of Sign
B := 0.7*ft
# Vertical Dimension of Sign
s := 8.4*ft
# (Section 26.7.3)
K_zB := 2.01*(h_2/z_gB)^(2/α_B) = 0.700591
K_zC := 2.01*(h_1/z_gC)^(2/α_C) = 0.982253
K_zD := 2.01*(h_3/z_gD)^(2/α_D) = 1.16222
# Exposure
Exp := "B"
# Wind Directionality Factor
K_d := 0.85
# (Table 26.6-1)
K_h := if(Exp == "B", K_zB, if(Exp == "C", K_zC, if(Exp == "D", K_zD, "Check Exp")))
# Velocity Pressure Coefficient
K_h = 0.700591  # (Table 29.3-1)  # REVISION HISTORY:
# 1) Made by John who knows when (probably in prehistoric ages)
# 2) Reviewed by JC, 3/1/2017
# Topographical Factor
K_zt := 1.0  # (Section 26.8.1)
# Velocity Pressure
q_h := 0.00256*K_h*K_zt*K_d*V^2 = 20.1613 pounds_per_sq_foot  # (Eq. 29.3-1)
# Aspect Ratio, B/s
B/s = 0.0833333
# Clearance Ratio, s/h
s/h = 0.28
# Net Pressure Coefficient, C_f
C_f := 1.95  # (Figure 29.4-1)
# Gust Effect Factor
G := 0.85  # For Rigid Structures  # (Section 26.9.1)
# Wind Pressure, P
P := q_h*G*C_f = 33.4174 pounds_per_sq_foot  # (Eq. 29.4-1)
# ASD Design Wind Pressure
P_wl := P*0.6 = 20.0504 pounds_per_sq_foot
