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## Wind Loading for Components and Cladding
psf := 1.0
mph := 1.0
ft := 1.0
# Design According to ASCE7-10 for Monoslope Roofs w/ h< 60ft and 3deg< θ <=10deg
z_gB := 1200
z_gC := 900
z_gD := 700
α_B := 7.0
α_C := 9.5
α_D := 11.5
# Basic Wind Speed
V := 115*mph
# Mean Roof Height
h := 50*ft
h_1 := max(15, h)
h_2 := max(30, h)
h_3 := max(15, h)
# Building Category
Cat := "III"  # (Table 1.5-1)
# Exposure
Exp := "D"  # (Section 26.7.3)
# Enclosure Classification
Enc := "Enclosed"
# (Section 26.10 )
K_hB := 2.01*(h_2/z_gB)^(2/α_B) = 0.810681
K_hC := 2.01*(h_1/z_gC)^(2/α_C) = 1.09378
K_hD := 2.01*(h_3/z_gD)^(2/α_D) = 1.27019
# Least Horizontal Dimension
L := 100*ft
# (Section 26.6 & Table 26.6-1)
K_h := if(Exp == "B", K_hB, if(Exp == "C", K_hC, if(Exp == "D", K_hD, "Check Exp"))) = 1.27019
# Wind Directionality Factor
K_d := 0.85
# (Table 30.3-1)
GC_pi := if(Enc == "Enclosed", 0.18, if(Enc == "Open", 0.0, 0.55)) = 0.18
# Velocity Pressure Coefficient @ h
K_h = 1.27019
# Topographical Factor
K_zt := 1.0
# (Section 26.8.2)
EWA := 1 .. 1000
GCp3_10 := -1.8
GCp3_100 := -1.2
# Velocity Pressure at Height, h
GCp1_10 := -1.1
GCp1_100 := -1.1
GCp2_10 := -1.3
GCp2_100 := -1.2
GCpos1_10 := 0.3
GCpos1_100 := 0.2
q_h := 0.00256*K_h*K_zt*K_d*V^2 = 36.5531 pounds_per_sq_foot  # (Eq. 30.3-1)
# Internal Pressure Coefficient
GC_pi = 0.18
GCp3'_10 := -2.6
GCp3'_100 := -1.6
# (Table 26.11-1)
GCp2'_10 := -1.6
GCp2'_100 := -1.5
# External Pressure Coefficient, GC_p | Varies based on zone & eff. wind area | (Figure 30.4-5A)
# Wind Pressure, P
# P = q_h (GC_p- GC_pi)
# (Eq. 30.4-1)
GCp_negZ1[EWA] := if(EWA ≤ 10, GCp1_10, if(EWA ≥ 100, GCp1_100, GCp1_10 + (GCp1_100 - GCp1_10)*(log(EWA) - log(10))/(log(100) - log(10))))
GCp_negZ2[EWA] := if(EWA ≤ 10, GCp2_10, if(EWA ≥ 100, GCp2_100, GCp2_10 + (GCp2_100 - GCp2_10)*(log(EWA) - log(10))/(log(100) - log(10))))
# Note:  Wind Pressure Varies by Zone and Effective Wind Area.  See Chart Below.
P_negZ1[EWA] := q_h*GCp_negZ1[EWA] - q_h*GC_pi
P_negZ2[EWA] := q_h*GCp_negZ2[EWA] - q_h*GC_pi  # Note qi is conservatively taken as qh
GCp_negZ3[EWA] := if(EWA ≤ 10, GCp3_10, if(EWA ≥ 100, GCp3_100, GCp3_10 + (GCp3_100 - GCp3_10)*(log(EWA) - log(10))/(log(100) - log(10))))
GCp_posZ1[EWA] := if(EWA ≤ 10, GCpos1_10, if(EWA ≥ 100, GCpos1_100, GCpos1_10 + (GCpos1_100 - GCpos1_10)*(log(EWA) - log(10))/(log(100) - log(10))))
# Effective Wind
# Area
# - Zone 1
# - Zone 2
# - Zone 3
P_negZ3[EWA] := q_h*GCp_negZ3[EWA] - q_h*GC_pi
P_posZ1[EWA] := q_h*GCp_posZ1[EWA] + q_h*GC_pi  # Note qi is conservatively taken as qh
# 10 sq. ft
GCp_negZ1[10] = -1.1
GCp_negZ2[10] = -1.3
GCp_negZ3[10] = -1.8
# 20 sq. ft
GCp_negZ1[20] = -1.1
GCp_negZ2[20] = -1.2699
GCp_negZ3[20] = -1.61938
GCp_negZ3'[EWA] := if(EWA ≤ 10, GCp3'_10, if(EWA ≥ 100, GCp3'_100, GCp3'_10 + (GCp3'_100 - GCp3'_10)*(log(EWA) - log(10))/(log(100) - log(10))))
GCp_negZ2'[EWA] := if(EWA ≤ 10, GCp2'_10, if(EWA ≥ 100, GCp2'_100, GCp2'_10 + (GCp2'_100 - GCp2'_10)*(log(EWA) - log(10))/(log(100) - log(10))))
# 50 sq. ft
GCp_negZ1[50] = -1.1
GCp_negZ2[50] = -1.2301
GCp_negZ3[50] = -1.38062
P_negZ3'[EWA] := q_h*GCp_negZ3'[EWA] - q_h*GC_pi
P_negZ2'[EWA] := q_h*GCp_negZ2'[EWA] - q_h*GC_pi  # Note qi is conservatively taken as qh
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# 100 sq. ft
GCp_negZ1[100] = -1.1
GCp_negZ2[100] = -1.2
GCp_negZ3[100] = -1.2
# Effective Wind
# Area
# +Zone 1,2,3
# - Zone 2`
# - Zone 3`
# 10 sq. ft
GCp_posZ1[10] = 0.3
GCp_negZ2'[10] = -1.6
GCp_negZ3'[10] = -2.6
# 20 sq. ft
GCp_posZ1[20] = 0.269897
GCp_negZ2'[20] = -1.5699
GCp_negZ3'[20] = -2.29897
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# 50 sq. ft
GCp_posZ1[50] = 0.230103
GCp_negZ2'[50] = -1.5301
GCp_negZ3'[50] = -1.90103
# 100 sq. ft
GCp_posZ1[100] = 0.2
GCp_negZ2'[100] = -1.5
GCp_negZ3'[100] = -1.6
# Effective Wind
# Area
# - Zone 1
# - Zone 2
# - Zone 3
# 10 sq. ft
P_negZ1[10] = -46.7879 pounds_per_sq_foot
P_negZ2[10] = -54.0986 pounds_per_sq_foot
P_negZ3[10] = -72.3751 pounds_per_sq_foot
# 20 sq. ft
P_negZ1[20] = -46.7879 pounds_per_sq_foot
P_negZ2[20] = -52.9982 pounds_per_sq_foot
P_negZ3[20] = -65.773 pounds_per_sq_foot  # REVISION HISTORY:
# 50 sq. ft
P_negZ1[50] = -46.7879 pounds_per_sq_foot
P_negZ2[50] = -51.5436 pounds_per_sq_foot
P_negZ3[50] = -57.0454 pounds_per_sq_foot
# 1) Made by John who knows when (probably in prehistoric ages)
# 2) Reviewed by JC, 3/1/2017
# 100 sq. ft
P_negZ1[100] = -46.7879 pounds_per_sq_foot
P_negZ2[100] = -50.4433 pounds_per_sq_foot
P_negZ3[100] = -50.4433 pounds_per_sq_foot
# Effective Wind
# Area
# +Zone 1,2,3
# - Zone 2`
# - Zone 3`
# 10 sq. ft
P_posZ1[10] = 17.5455 pounds_per_sq_foot
P_negZ2'[10] = -65.0645 pounds_per_sq_foot
P_negZ3'[10] = -101.618 pounds_per_sq_foot
# 20 sq. ft
P_posZ1[20] = 16.4451 pounds_per_sq_foot
P_negZ2'[20] = -63.9641 pounds_per_sq_foot
P_negZ3'[20] = -90.614 pounds_per_sq_foot
# 50 sq. ft
P_posZ1[50] = 14.9905 pounds_per_sq_foot
P_negZ2'[50] = -62.5095 pounds_per_sq_foot
P_negZ3'[50] = -76.0681 pounds_per_sq_foot
# 100 sq. ft
P_posZ1[100] = 13.8902 pounds_per_sq_foot
P_negZ2'[100] = -61.4092 pounds_per_sq_foot
P_negZ3'[100] = -65.0645 pounds_per_sq_foot
# Corner Zone Dimensions, a
a := max(0.10*L, 3*ft) = 10 ft
# Minimum LRFD Wind Pressure is 16 psf (Section 30.2.2)
