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## Wind Loading for Components and Cladding
psf := 1.0
mph := 1.0
ft := 1.0  # qz not required for roofs.
# Design According to ASCE7-10 for Roofs w/ h> 60ft
z_gB := 1200
z_gC := 900
z_gD := 700
α_B := 7.0
α_C := 9.5
α_D := 11.5
# Basic Wind Speed
V := 115*mph
# Mean Roof Height
h := 50*ft
# (Table 1.5-1)
h_1 := max(15, h)
h_2 := max(30, h)
h_3 := max(15, h)
# Building Risk Category
Cat := "III"
# Exposure
Exp := "D"  # (Section 26.7.3)
# Enclosure Classification
Enc := "Enclosed"  # (Section 26.10 )
K_hB := 2.01*(h_2/z_gB)^(2/α_B) = 0.810681
K_hC := 2.01*(h_1/z_gC)^(2/α_C) = 1.09378
K_hD := 2.01*(h_3/z_gD)^(2/α_D) = 1.27019
# Least Horizontal Dimension
L := 100*ft
# Wind Directionality Factor
K_d := 0.85
# (Section 26.6 & Table 26.6-1)
K_h := if(Exp == "B", K_hB, if(Exp == "C", K_hC, if(Exp == "D", K_hD, "Check Exp"))) = 1.27019
I_w := if(Cat == "II", 1.0, 1.15)
# (Table 30.3-1)
GC_pi := if(Enc == "Enclosed", 0.18, if(Enc == "Open", 0.0, 0.55)) = 0.18
# Velocity Pressure Coefficient @ h
K_h = 1.27019
# Topographical Factor
K_zt := 1.0
# (Section 26.8.2)
EWA := 1 .. 1000
# (Eq. 30.3-1)
GCp1_10 := -1.4
GCp1_500 := -0.9
GCp2_10 := -2.3
GCp2_500 := -1.6
GCp3_10 := -3.2
GCp3_500 := -2.3
GCpos1_10 := 0.3
GCpos1_100 := 0.2
# Velocity Pressure at Height, h
q_h := 0.00256*K_h*K_zt*K_d*V^2 = 36.5531 pounds_per_sq_foot
# Internal Pressure Coefficient
GC_pi = 0.18
# (Table 26.11-1)
GCp_negZ1[EWA] := if(EWA ≤ 10, GCp1_10, if(EWA ≥ 500, GCp1_500, GCp1_10 + (GCp1_500 - GCp1_10)*(log(EWA) - log(10))/(log(500) - log(10))))
GCp_negZ2[EWA] := if(EWA ≤ 10, GCp2_10, if(EWA ≥ 500, GCp2_500, GCp2_10 + (GCp2_500 - GCp2_10)*(log(EWA) - log(10))/(log(500) - log(10))))
# External Pressure Coefficient, GC_p
# Varies based on zone & eff. wind area
# (Figure 30.6-1)
P_negZ1[EWA] := q_h*GCp_negZ1[EWA] - q_h*GC_pi
P_negZ2[EWA] := q_h*GCp_negZ2[EWA] - q_h*GC_pi  # Note qi is conservatively taken as qh
# Wind Pressure, P | P = q (GC_p)- q_i (GC_pi) | (Eq. 30.6-1)
# Note:  Wind Pressure Varies by Zone and Effective Wind Area.  See Chart Below.
GCp_negZ3[EWA] := if(EWA ≤ 10, GCp3_10, if(EWA ≥ 500, GCp3_500, GCp3_10 + (GCp3_500 - GCp3_10)*(log(EWA) - log(10))/(log(500) - log(10))))
GCp_posZ1[EWA] := if(EWA ≤ 10, GCpos1_10, if(EWA ≥ 100, GCpos1_100, GCpos1_10 + (GCpos1_100 - GCpos1_10)*(log(EWA) - log(10))/(log(100) - log(10))))
# Effective Wind
# Area
# - Zone 1
# - Zone 2
# - Zone 3
P_negZ3[EWA] := q_h*GCp_negZ3[EWA] - q_h*GC_pi
P_posZ1[EWA] := q_h*GCp_posZ1[EWA] + q_h*GC_pi  # Note qi is conservatively taken as qh
# 10 sq. ft
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GCp_negZ1[10] = -1.4
GCp_negZ2[10] = -2.3
GCp_negZ3[10] = -3.2
# 20 sq. ft
GCp_negZ1[20] = -1.31141
GCp_negZ2[20] = -2.17597
GCp_negZ3[20] = -3.04053
# 100 sq. ft
GCp_negZ1[100] = -1.1057
GCp_negZ2[100] = -1.88799
GCp_negZ3[100] = -2.67027
# 500 sq. ft
GCp_negZ1[500] = -0.9
GCp_negZ2[500] = -1.6
GCp_negZ3[500] = -2.3
# Effective Wind
# Area
# - Zone 1
# - Zone 2
# - Zone 3
# 10 sq. ft
P_negZ1[10] = -57.7539 pounds_per_sq_foot
P_negZ2[10] = -90.6516 pounds_per_sq_foot
P_negZ3[10] = -123.549 pounds_per_sq_foot
# 20 sq. ft
P_negZ1[20] = -54.5156 pounds_per_sq_foot
P_negZ2[20] = -86.118 pounds_per_sq_foot
P_negZ3[20] = -117.72 pounds_per_sq_foot
# REVISION HISTORY:
# 50 sq. ft
P_negZ1[50] = -50.2348 pounds_per_sq_foot
P_negZ2[50] = -80.1249 pounds_per_sq_foot
P_negZ3[50] = -110.015 pounds_per_sq_foot
# 1) Made by John who knows when (probably in prehistoric ages)
# 2) Reviewed by JC, 3/1/2017
# 100 sq. ft
P_negZ1[100] = -46.9964 pounds_per_sq_foot
P_negZ2[100] = -75.5913 pounds_per_sq_foot
P_negZ3[100] = -104.186 pounds_per_sq_foot
# Corner Zone Dimensions, a
a := max(0.10*L, 3*ft) = 10 ft
