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## Wind Loading for Components and Cladding
psf := 1.0
mph := 1.0
ft := 1.0
# Design According to ASCE7-10 for Walls w/ h> 60ft
z_gB := 1200
z_gC := 900
z_gD := 700
α_B := 7.0
α_C := 9.5
α_D := 11.5
# Basic Wind Speed
V := 120*mph
# Mean Roof Height
h := 80*ft
h_1 := max(15, h)
h_2 := max(30, h)
h_3 := max(15, h)
# Height of Component Above Ground
z := 25*ft
z_1 := max(15, z)
z_2 := max(30, z)
z_3 := max(15, z)
# Building Category
Cat := "III"  # (Table 1.5-1)
# Exposure
Exp := "D"  # (Section 26.7.3)
# Enclosure Classification
K_hB := 2.01*(h_2/z_gB)^(2/α_B) = 0.927193
K_hC := 2.01*(h_1/z_gC)^(2/α_C) = 1.20754
K_hD := 2.01*(h_3/z_gD)^(2/α_D) = 1.37838
Enc := "Enclosed"  # (Section 26.10 )
K_zB := 2.01*(z_2/z_gB)^(2/α_B) = 0.700591
K_zC := 2.01*(z_1/z_gC)^(2/α_C) = 0.945265
K_zD := 2.01*(z_3/z_gD)^(2/α_D) = 1.12594
# Least Horizontal Dimension
L := 165*ft
K_h := if(Exp == "B", K_hB, if(Exp == "C", K_hC, if(Exp == "D", K_hD, "Check Exp"))) = 1.37838
# (Table 26.6-1)
K_z := if(Exp == "B", K_zB, if(Exp == "C", K_zC, if(Exp == "D", K_zD, "Check Exp"))) = 1.12594
# Wind Directionality Factor
K_d := 0.85
GC_pi := if(Enc == "Enclosed", 0.18, if(Enc == "Open", 0.0, 0.55)) = 0.18
# Velocity Pressure Coefficient @ h
K_h = 1.37838
# (Section 30.3.1 & Table 30.3-1)
EWA := 1 .. 1000
# Velocity Pressure Coefficient @ z
K_z = 1.12594
GCp5n_20 := -1.8
GCp5n_500 := -1.0
# (Section 30.3.1 & Table 30.3-1)
GCp45_20 := 0.9
GCp45_500 := 0.6
GCp4n_20 := -0.9
GCp4n_500 := -0.7
# Topographical Factor
K_zt := 1.0  # (Section 26.8.2)
# Velocity Pressure at Height, h
q_h := 0.00256*K_h*K_zt*K_d*V^2 = 43.1907 pounds_per_sq_foot  # (Eq. 30.3-1)
# Velocity Pressure at Height, z
q_z := 0.00256*K_z*K_zt*K_d*V^2 = 35.2807 pounds_per_sq_foot  # (Eq. 30.3-1)
# Internal Pressure Coefficient
GC_pi = 0.18  # (Table 26.11-1)
GCp_negZ4[EWA] := if(EWA ≤ 20, GCp4n_20, if(EWA ≥ 500, GCp4n_500, GCp4n_20 + (GCp4n_500 - GCp4n_20)*(log(EWA) - log(20))/(log(500) - log(20))))
GCp_posZ45[EWA] := if(EWA ≤ 20, GCp45_20, if(EWA ≥ 500, GCp45_500, GCp45_20 + (GCp45_500 - GCp45_20)*(log(EWA) - log(20))/(log(500) - log(20))))
# External Pressure Coefficient, GC_p | Varies based on zone & eff. wind area | (Figure 30.6-1)
P_negZ4[EWA] := q_h*GCp_negZ4[EWA] - q_h*GC_pi
P_posZ45[EWA] := q_z*GCp_posZ45[EWA] - (-q_h*GC_pi)  # Note qi is conservatively taken as qh
# Wind Pressure, P | P = q (GC_p)- q_i (GC_pi) | (Eq. 30.6-1)
# Note:  Wind Pressure Varies by Zone and Effective Wind Area.  See Chart Below.
GCp_negZ5[EWA] := if(EWA ≤ 20, GCp5n_20, if(EWA ≥ 500, GCp5n_500, GCp5n_20 + (GCp5n_500 - GCp5n_20)*(log(EWA) - log(20))/(log(500) - log(20))))
# Effective Wind
# Area
# + Zone 4 & 5
# - Zone 4
# - Zone 5
P_negZ5[EWA] := q_h*GCp_negZ5[EWA] - q_h*GC_pi
# 20 sq. ft
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GCp_posZ45[20] = 0.9
GCp_negZ4[20] = -0.9
GCp_negZ5[20] = -1.8
# 50 sq. ft
GCp_posZ45[50] = 0.814601
GCp_negZ4[50] = -0.843068
GCp_negZ5[50] = -1.57227
# 100 sq. ft
GCp_posZ45[100] = 0.75
GCp_negZ4[100] = -0.8
GCp_negZ5[100] = -1.4
# 200 sq. ft
GCp_posZ45[200] = 0.685399
GCp_negZ4[200] = -0.756932
GCp_negZ5[200] = -1.22773
# 300 sq. ft
GCp_posZ45[300] = 0.647609
GCp_negZ4[300] = -0.731739
GCp_negZ5[300] = -1.12696
# 500 sq. ft
GCp_posZ45[500] = 0.6
GCp_negZ4[500] = -0.7
GCp_negZ5[500] = -1
# Effective Wind
# Area
# + Zone 4 & 5
# - Zone 4
# - Zone 5
# REVISION HISTORY:
# 1) Made by John who knows when (probably in prehistoric ages)
# 2) Reviewed by JC, 3/1/2017
# 20 sq. ft
P_posZ45[20] = 39.527 pounds_per_sq_foot
P_negZ4[20] = -46.6459 pounds_per_sq_foot
P_negZ5[20] = -85.5175 pounds_per_sq_foot
# 50 sq. ft
P_posZ45[50] = 36.5141 pounds_per_sq_foot
P_negZ4[50] = -44.187 pounds_per_sq_foot
P_negZ5[50] = -75.6817 pounds_per_sq_foot
# 100 sq. ft
P_posZ45[100] = 34.2349 pounds_per_sq_foot
P_negZ4[100] = -42.3269 pounds_per_sq_foot
P_negZ5[100] = -68.2413 pounds_per_sq_foot
# 200 sq. ft
P_posZ45[200] = 31.9557 pounds_per_sq_foot
P_negZ4[200] = -40.4667 pounds_per_sq_foot
P_negZ5[200] = -60.8008 pounds_per_sq_foot
# 300 sq. ft
P_posZ45[300] = 30.6225 pounds_per_sq_foot
P_negZ4[300] = -39.3786 pounds_per_sq_foot
P_negZ5[300] = -56.4484 pounds_per_sq_foot
# 500 sq. ft
P_posZ45[500] = 28.9428 pounds_per_sq_foot
P_negZ4[500] = -38.0078 pounds_per_sq_foot
P_negZ5[500] = -50.965 pounds_per_sq_foot
# Corner Zone Dimensions, a
a := max(0.10*L, 3*ft) = 16.5 ft
# Minimum LRFD Wind Pressure is 16 psf (Section 30.2.2)
