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## Wind Loading for Components and Cladding
psf := 1.0
mph := 1.0
ft := 1.0
# Design According to ASCE7-10 for Walls w/ h<= 60ft
z_gB := 1200
z_gC := 900
z_gD := 700
α_B := 7.0
α_C := 9.5
α_D := 11.5
# Basic Wind Speed
V := 115*mph
# Mean Roof Height
h := 26*ft
h_1 := max(15, h)
h_2 := max(30, h)
h_3 := max(15, h)
# Roof angle
θ := 20*deg
# Risk Category
Cat := "II"
# (Table 1.5-1)
I_w := if(Cat == "II", 1.0, 1.15)
n_5 := if(θ ≤ 10*deg, 0.9, 1.0) = 1
# Exposure
Exp := "C"
# (Section 26.7.3)
K_hB := 2.01*(h_2/z_gB)^(2/α_B) = 0.700591
K_hC := 2.01*(h_1/z_gC)^(2/α_C) = 0.953102
K_hD := 2.01*(h_3/z_gD)^(2/α_D) = 1.13365
# Enclosure Classification
Enc := "Open"  # (Section 26.10 )
K_h := if(Exp == "B", K_hB, if(Exp == "C", K_hC, if(Exp == "D", K_hD, "Check Exp"))) = 0.953102
# Least Horizontal Dimension
L := 20*ft
GC_pi := if(Enc == "Enclosed", 0.18, if(Enc == "Open", 0.0, 0.55)) = 0
# Wind Directionality Factor
K_d := 0.85
# (Section 26.6 & Table 26.6-1)
EWA := 1 .. 1000
GCp45_500 := 0.7
GCp4n_10 := -1.1
GCp4n_500 := -0.8
GCp5n_10 := -1.4
GCp5n_500 := -0.8
# Velocity Pressure Coefficient
K_h = 0.953102
# (Table 30.3-1)
GCp45_10 := 1
# Topographical Factor
K_zt := 1.0  # (Section 26.8.2)
# (Eq. 30.3-1)
GCp_posZ45[EWA] := n_5*if(EWA ≤ 10, GCp45_10, if(EWA ≥ 500, GCp45_500, GCp45_10 + (GCp45_500 - GCp45_10)*(log(EWA) - log(10))/(log(500) - log(10))))
# Velocity Pressure
q_h := 0.00256*K_h*K_zt*K_d*V^2 = 27.428 pounds_per_sq_foot
# (Table 26.11-1)
P_posZ45[EWA] := q_h*(GCp_posZ45[EWA] - (-GC_pi))
# Internal Pressure Coefficient
GC_pi = 0
# External Pressure Coefficient, GC_p
# Varies based on zone & eff. wind area
# (Figure 30.4-1)
GCp_negZ4[EWA] := n_5*if(EWA ≤ 10, GCp4n_10, if(EWA ≥ 500, GCp4n_500, GCp4n_10 + (GCp4n_500 - GCp4n_10)*(log(EWA) - log(10))/(log(500) - log(10))))
# Wind Pressure, P
# P = q_h (GC_p - GC_pi)
# (Eq. 30.4-1)
P_negZ4[EWA] := q_h*(GCp_negZ4[EWA] - GC_pi)
# Note:  Wind Pressure Varies by Zone and Effective Wind Area.  See Charts Below. If the roof angle is less than 10 degrees, the GCp values were reduced by 10% per footnote 5 in figure 30.4-1.
GCp_negZ5[EWA] := n_5*if(EWA ≤ 10, GCp5n_10, if(EWA ≥ 500, GCp5n_500, GCp5n_10 + (GCp5n_500 - GCp5n_10)*(log(EWA) - log(10))/(log(500) - log(10))))
P_negZ5[EWA] := q_h*(GCp_negZ5[EWA] - GC_pi)
# Effective Wind
# Area
# + Zone 4 & 5
# - Zone 4
# - Zone 5
# REVISION HISTORY:
# 1) Made by John who knows when (probably in prehistoric ages)
# 2) Reviewed by JC, 3/1/2017
# 3) Fixed effective wind area subscripts,by JC, 5/11/2018
# 10 sq. ft
GCp_posZ45[10] = 1
GCp_negZ4[10] = -1.1
GCp_negZ5[10] = -1.4
# 20 sq. ft
GCp_posZ45[20] = 0.946845
GCp_negZ4[20] = -1.04684
GCp_negZ5[20] = -1.29369
# 50 sq. ft
GCp_posZ45[50] = 0.876578
GCp_negZ4[50] = -0.976578
GCp_negZ5[50] = -1.15316
# 100 sq. ft
GCp_posZ45[100] = 0.823422
GCp_negZ4[100] = -0.923422
GCp_negZ5[100] = -1.04684
# 200 sq. ft
GCp_posZ45[200] = 0.770267
GCp_negZ4[200] = -0.870267
GCp_negZ5[200] = -0.940535
# 300 sq. ft
GCp_posZ45[300] = 0.739174
GCp_negZ4[300] = -0.839174
GCp_negZ5[300] = -0.878347
# 500 sq. ft
GCp_posZ45[500] = 0.7
GCp_negZ4[500] = -0.8
GCp_negZ5[500] = -0.8
# Effective Wind
# Area
# + Zone 4 & 5
# - Zone 4
# - Zone 5
# 10 sq. ft
P_posZ45[10] = 27.428 pounds_per_sq_foot
P_negZ4[10] = -30.1708 pounds_per_sq_foot
P_negZ5[10] = -38.3992 pounds_per_sq_foot
# 20 sq. ft
P_posZ45[20] = 25.9701 pounds_per_sq_foot
P_negZ4[20] = -28.7128 pounds_per_sq_foot
P_negZ5[20] = -35.4833 pounds_per_sq_foot
# 50 sq. ft
P_posZ45[50] = 24.0428 pounds_per_sq_foot
P_negZ4[50] = -26.7856 pounds_per_sq_foot
P_negZ5[50] = -31.6287 pounds_per_sq_foot
# 100 sq. ft
P_posZ45[100] = 22.5848 pounds_per_sq_foot
P_negZ4[100] = -25.3276 pounds_per_sq_foot
P_negZ5[100] = -28.7128 pounds_per_sq_foot
# 200 sq. ft
P_posZ45[200] = 21.1269 pounds_per_sq_foot
P_negZ4[200] = -23.8697 pounds_per_sq_foot
P_negZ5[200] = -25.797 pounds_per_sq_foot
# 300 sq. ft
P_posZ45[300] = 20.274 pounds_per_sq_foot
P_negZ4[300] = -23.0168 pounds_per_sq_foot
P_negZ5[300] = -24.0913 pounds_per_sq_foot
# 500 sq. ft
P_posZ45[500] = 19.1996 pounds_per_sq_foot
P_negZ4[500] = -21.9424 pounds_per_sq_foot
P_negZ5[500] = -21.9424 pounds_per_sq_foot
# Corner Zone Dimensions, a
a := max(min(0.1*L, 0.4*h), max(3*ft, 0.04*L)) = 3 ft
# Minimum LRFD Wind Pressure is 16 psf (Section 30.2.2)
