## Topographical Factor Calculator
# Design According to ASCE7-10, Figure 26.8-1
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# Hill Height
M_1 := [1.30, 1.45, 1.55; 0.75, 0.85, 0.95; 0.95, 1.05, 1.15]
M_2 := [3; 2.5; 4]
M_3 := [1.5, 1.5; 1.5, 4; 1.5, 1.5]
H := 1000*ft
# Upwind Distance to Half Height
L_h := 3000*ft
L_eff := if(H/L_h ≤ 0.5, L_h, 2*H) = 3000 ft
# Distance from Crest to Building
x := 4000*ft
# Building Height
z := 30*ft
# Exposure
Exp := "B"
a := if(Exp == "B", 0, if(Exp == "C", 1, if(Exp == "D", 2, "ERROR"))) = 0
# Topo Shape
Hill := "2D_Escarpment"
S := if(Hill == "2D_Ridge", 0, if(Hill == "2D_Escarpment", 1, if(Hill == "3D_Hill", 2, "ERROR"))) = 1
μ := 1*M_3[S, 1] = 4
γ := 1*M_2[S, 0] = 2.5
# Effective Length (for H/L_h > 0.5 for K_2 and K_3)
L_eff = 3000 ft
K_1 := M_1[S, a]*min(0.5, H/L_h) = 0.25
K_2 := (1 - x/(μ*L_eff)) = 0.666667
K_3 := e^(-γ*(z/L_eff)) = 0.97531
# or max 0.5
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# K_1 Multiplier
K_1 = 0.25
H/L_h = 0.333333
# K_2 Multiplier
K_2 = 0.666667
x/L_eff = 1.33333  # For H/L_h > 0.5, then L_h=2H
# K_3 Multiplier
K_3 = 0.97531
z/L_eff = 0.01  # For H/L_h > 0.5, then L_h=2H
# Topographical Factor
K_zt := (1 + K_1*K_2*K_3)^2 = 1.35153
# _________________________________________________________________________________________________
# NOT FOR REPORT:
"2D_Ridge"
"2D_Escarpment"
"3D_Hill"
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# Check:
KHL := K_1/min(0.5, H/L_h) = 0.75
γ = 2.5
μ = 4
# __________________________________________________________________________________________________
# Note: This Table is for Exposure C, other exposures must be calculated
