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psf := 1.0
mph := 1.0
ft := 1.0
## Wind Loading for Components and Cladding
# Design According to ASCE7-05 for Troughed Free Roofs θ<=45 Deg
z_gB := 1200
z_gC := 900
z_gD := 700
α_B := 7.0
α_C := 9.5
α_D := 11.5
# Basic Wind Speed
V := 98*mph
# Mean Roof Height
h := 35*ft
# Building Category
Cat := "II"  # (Table 1-1)
h_1 := max(15, h)
h_2 := max(30, h)
h_3 := max(15, h)
# Exposure
Exp := "C"
# (Section 6.5.6)
K_hB := 2.01*(h_2/z_gB)^(2/α_B) = 0.732137
K_hC := 2.01*(h_1/z_gC)^(2/α_C) = 1.01465
K_hD := 2.01*(h_3/z_gD)^(2/α_D) = 1.1938
# Wind Flow
Flow := "Clear"
# (Figure 6-5)
x := if(Flow == "Clear", 0, 3) = 0
K_h := if(Exp == "B", K_hB, if(Exp == "C", K_hC, if(Exp == "D", K_hD, "Check Exp"))) = 1.01465
# Least Horizontal Dimension
L := 17.5*ft
I_w := if(Cat == "II", 1.0, 1.15)
# (Section 6.5.5 & Table 6-1)
i := 1 .. 5
# Wind Importance Factor
I_w = 1
# Wind Directionality Factor
K_d := 0.85  # (Section 6.5.4.4 & Table 6-4)
# (Section 6.5.6.6 & Table 6-3)
θt := [0*deg; 7.5*deg; 15*deg; 30*deg; 45*deg]
CposZ3Clr := [
    2.4, 1.8, 1.2, 1, 0.8, 0.5;
    2.4, 1.8, 1.2, 1, 0.8, 0.5;
    2.2, 1.7, 1.1, 1, 0.8, 0.5;
    1.8, 1.4, 0.9, 1, 0.8, 0.5;
    1.6, 1.2, 0.8, 1, 0.8, 0.5
]
CnegZ3Clr := [
    -3.3, -1.7, -1.1, -3.6, -1.8, -1.2;
    -3.3, -1.7, -1.1, -4.8, -2.4, -1.6;
    -2.2, -1.7, -1.1, -2.4, -1.8, -1.2;
    -2.6, -2.0, -1.3, -2.8, -2.1, -1.4;
    -2.2, -1.7, -1.1, -2.4, -1.8, -1.2
]
CposZ2Clr := [
    1.8, 1.8, 1.2, 0.8, 0.8, 0.5;
    1.8, 1.8, 1.2, 0.8, 0.8, 0.5;
    1.7, 1.7, 1.1, 0.8, 0.8, 0.5;
    1.4, 1.4, 1.9, 0.8, 0.8, 0.5;
    1.2, 1.2, 1.8, 0.8, 0.8, 0.5
]
CnegZ2Clr := [
    -1.7, -1.7, -1.1, -1.8, -1.8, -1.2;
    -1.7, -1.7, -1.1, -2.4, -2.4, -1.6;
    -1.7, -1.7, -1.1, -1.8, -1.8, -1.2;
    -2, -2, -1.3, -2.1, -2.1, -1.4;
    -1.7, -1.7, -1.1, -1.8, -1.8, -1.2
]
CposZ1Clr := [
    1.2, 1.2, 1.2, 0.5, 0.5, 0.5;
    1.2, 1.2, 1.2, 0.5, 0.5, 0.5;
    1.1, 1.1, 1.1, 0.5, 0.5, 0.5;
    0.9, 0.9, 0.9, 0.5, 0.5, 0.5;
    0.8, 0.8, 0.8, 0.5, 0.5, 0.5
]
CnegZ1Clr := [
    -1.1, -1.1, -1.1, -1.2, -1.2, -1.2;
    -1.1, -1.1, -1.1, -1.6, -1.6, -1.6;
    -1.1, -1.1, -1.1, -1.2, -1.2, -1.2;
    -1.3, -1.3, -1.3, -1.4, -1.4, -1.4;
    -1.1, -1.1, -1.1, -1.2, -1.2, -1.2
]
# Velocity Pressure Coefficient
K_h = 1.01465
# Topographical Factor
K_zt := 1.0  # (Section 6.5.7.1)
# Roof Angle
θ := 4*deg
C_N_pos1_Z3 := linterp(θt, CposZ3Clr[:, 0 + x], θ) = 2.4
C_N_pos1_Z1 := linterp(θt, CposZ1Clr[:, 0 + x], θ) = 1.2
C_N_pos1_Z2 := linterp(θt, CposZ2Clr[:, 0 + x], θ) = 1.8
# Velocity Pressure
q_h := 0.00256*K_h*K_zt*K_d*V^2*I_w = 21.2045 pounds_per_sq_foot
C_N_neg1_Z3 := linterp(θt, CnegZ3Clr[:, 0 + x], θ) = -3.3
# (Eq. 6-15)
C_N_neg1_Z1 := linterp(θt, CnegZ1Clr[:, 0 + x], θ) = -1.1
C_N_neg1_Z2 := linterp(θt, CnegZ2Clr[:, 0 + x], θ) = -1.7
C_N_pos2_Z3 := linterp(θt, CposZ3Clr[:, 1 + x], θ) = 1.8
# Net Pressure Coefficient, C_N
# Varies based on zone & eff. wind area
# (Figure 6-19A)
C_N_pos2_Z1 := linterp(θt, CposZ1Clr[:, 1 + x], θ) = 1.2
C_N_pos2_Z2 := linterp(θt, CposZ2Clr[:, 1 + x], θ) = 1.8
# Gust Effect Factor
G := 0.85
C_N_neg2_Z3 := linterp(θt, CnegZ3Clr[:, 1 + x], θ) = -1.7
# For Rigid Structures
# (Section 6.5.8.1)
C_N_neg2_Z1 := linterp(θt, CnegZ1Clr[:, 1 + x], θ) = -1.1
C_N_neg2_Z2 := linterp(θt, CnegZ2Clr[:, 1 + x], θ) = -1.7
C_N_pos3_Z3 := linterp(θt, CposZ3Clr[:, 2 + x], θ) = 1.2
# Wind Pressure, P
# P = q_h G C_N
# (Eq. 6-26)
C_N_pos3_Z1 := linterp(θt, CposZ1Clr[:, 2 + x], θ) = 1.2
C_N_pos3_Z2 := linterp(θt, CposZ2Clr[:, 2 + x], θ) = 1.2
C_N_neg3_Z3 := linterp(θt, CnegZ3Clr[:, 2 + x], θ) = -1.1
# Note:  Wind Pressure Varies by Zone and Effective Wind Area.  See Chart Below.
C_N_neg3_Z1 := linterp(θt, CnegZ1Clr[:, 2 + x], θ) = -1.1
C_N_neg3_Z2 := linterp(θt, CnegZ2Clr[:, 2 + x], θ) = -1.1
# Corner Zone Dinsions, a
a := max(min(0.1*L, 0.4*h), max(3, 0.04*L)) = 3 ft
P_1negZ1 := q_h*G*C_N_neg1_Z1 = -19.8262 pounds_per_sq_foot
P_2negZ1 := q_h*G*C_N_neg2_Z1 = -19.8262 pounds_per_sq_foot
P_3negZ1 := q_h*G*C_N_neg3_Z1 = -19.8262 pounds_per_sq_foot
P_1negZ2 := q_h*G*C_N_neg1_Z2 = -30.6405 pounds_per_sq_foot
P_2negZ2 := q_h*G*C_N_neg2_Z2 = -30.6405 pounds_per_sq_foot
P_3negZ2 := q_h*G*C_N_neg3_Z2 = -19.8262 pounds_per_sq_foot
P_1negZ3 := q_h*G*C_N_neg1_Z3 = -59.4787 pounds_per_sq_foot
P_2negZ3 := q_h*G*C_N_neg2_Z3 = -30.6405 pounds_per_sq_foot
P_3negZ3 := q_h*G*C_N_neg3_Z3 = -19.8262 pounds_per_sq_foot
a^2 = 9 ft^2
# Effective Wind Area
4*a^2 = 36 ft^2
P_1posZ1 := q_h*G*C_N_pos1_Z1 = 21.6286 pounds_per_sq_foot
P_2posZ1 := q_h*G*C_N_pos2_Z1 = 21.6286 pounds_per_sq_foot
P_3posZ1 := q_h*G*C_N_pos3_Z1 = 21.6286 pounds_per_sq_foot
P_1posZ2 := q_h*G*C_N_pos1_Z2 = 32.4429 pounds_per_sq_foot
P_2posZ2 := q_h*G*C_N_pos2_Z2 = 32.4429 pounds_per_sq_foot
P_3posZ2 := q_h*G*C_N_pos3_Z2 = 21.6286 pounds_per_sq_foot
P_1posZ3 := q_h*G*C_N_pos1_Z3 = 43.2572 pounds_per_sq_foot
P_2posZ3 := q_h*G*C_N_pos2_Z3 = 32.4429 pounds_per_sq_foot
P_3posZ3 := q_h*G*C_N_pos3_Z3 = 21.6286 pounds_per_sq_foot
# _______________________________________________________________________________________________
# Zone
# <=a^2
# >a^2,<=4a^2
# >4a^2
# +Zone 1
P_1posZ1 = 21.6286 pounds_per_sq_foot
P_2posZ1 = 21.6286 pounds_per_sq_foot
P_3posZ1 = 21.6286 pounds_per_sq_foot  # REVISION HISTORY:
# 1) Made by John who knows when (probably in prehistoric ages)
# 2) Reviewed by JC, 3/1/2017
# -Zone 1
P_1negZ1 = -19.8262 pounds_per_sq_foot
P_2negZ1 = -19.8262 pounds_per_sq_foot
P_3negZ1 = -19.8262 pounds_per_sq_foot
# +Zone 2
P_1posZ2 = 32.4429 pounds_per_sq_foot
P_2posZ2 = 32.4429 pounds_per_sq_foot
P_3posZ2 = 21.6286 pounds_per_sq_foot
# -Zone 2
P_1negZ2 = -30.6405 pounds_per_sq_foot
P_2negZ2 = -30.6405 pounds_per_sq_foot
P_3negZ2 = -19.8262 pounds_per_sq_foot
# +Zone 3
P_1posZ3 = 43.2572 pounds_per_sq_foot
P_2posZ3 = 32.4429 pounds_per_sq_foot
P_3posZ3 = 21.6286 pounds_per_sq_foot
# -Zone 3
P_1negZ3 = -59.4787 pounds_per_sq_foot
P_2negZ3 = -30.6405 pounds_per_sq_foot
P_3negZ3 = -19.8262 pounds_per_sq_foot
