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psf := 1.0
mph := 1.0
ft := 1.0
## Wind Loading for Components and Cladding
# Design According to ASCE7-05 for Gable Roof Overhangs w/ θ <= 7 deg and h<= 60ft
z_gB := 1200
z_gC := 900
z_gD := 700
α_B := 7.0
α_C := 9.5
α_D := 11.5
# Basic Wind Speed
V := 90*mph
# Mean Roof Height
h := 30*ft
# Building Category
Cat := "III"  # (Table 1-1)
# Exposure
Exp := "C"
# (Section 6.5.6)
h_1 := max(15, h)
h_2 := max(30, h)
h_3 := max(15, h)
# Enclosure Classification
K_hB := 2.01*(h_2/z_gB)^(2/α_B) = 0.700591
K_hC := 2.01*(h_1/z_gC)^(2/α_C) = 0.982253
K_hD := 2.01*(h_3/z_gD)^(2/α_D) = 1.16222
Enc := "Enclosed"  # (Section 6-2)
I_w := if(Cat == "II", 1.0, 1.15)
# Least Horizontal Dimension
L := 130*ft
K_h := if(Exp == "B", K_hB, if(Exp == "C", K_hC, if(Exp == "D", K_hD, "Check Exp"))) = 0.982253
# Wind Importance Factor
I_w = 1.15
# (Section 6.5.5 & Table 6-1)
GC_pi := if(Enc == "Enclosed", 0.18, if(Enc == "Open", 0.0, 0.55)) = 0.18
# Wind Directionality Factor
K_d := 0.85
# (Section 6.5.4.4 & Table 6-4)
EWA := 1 .. 1000
GCp3n_10 := -2.8
GCp3n_100 := -0.8
# Velocity Pressure Coefficient
GCp12_100 := -1.6
GCp12_500 := -1.1
K_h = 0.982253  # (Section 6.5.6.6 & Table 6-3)
GCp12_10 := -1.7
# Topographical Factor
K_zt := 1.0
# (Section 6.5.7.1)
GCp_negZ12[EWA] := if(EWA ≤ 10, GCp12_10, if(EWA ≥ 500, GCp12_500, if(EWA ≥ 100, GCp12_100 + (GCp12_500 - GCp12_100)*(log(EWA) - log(100))/(log(500) - log(100)), GCp12_10 + (GCp12_100 - GCp12_10)*(log(EWA) - log(10))/(log(100) - log(10)))))
# Velocity Pressure
q_h := 0.00256*K_h*K_zt*K_d*V^2*I_w = 19.9097 pounds_per_sq_foot
# (Eq. 6-15)
P_negZ12[EWA] := q_h*(GCp_negZ12[EWA] - GC_pi)
# Internal Pressure Coefficient
GC_pi = 0.18
# (Figure 6-5)
GCp_negZ3[EWA] := if(EWA ≤ 10, GCp3n_10, if(EWA ≥ 100, GCp3n_100, GCp3n_10 + (GCp3n_100 - GCp3n_10)*(log(EWA) - log(10))/(log(100) - log(10))))
# External Pressure Coefficient, GC_p
# Varies based on zone & eff. wind area
# (Figure 6-11B)
P_negZ3[EWA] := q_h*(GCp_negZ3[EWA] - GC_pi)
# Wind Pressure, P | P = q_h (GC_p - GC_pi) | (Eq. 6-22)
# Effective Wind
# Area
# - Zone 1 & 2
# - Zone 3
# Note:  Wind Pressure Varies by Zone and Effective Wind Area.  See Chart Below.
# 10 sq. ft
GCp_negZ12[10] = -1.7
GCp_negZ3[10] = -2.8
# Effective Wind
# Area
# - Zone 1 & 2
# - Zone 3
# 20 sq. ft
GCp_negZ12[20] = -1.6699
GCp_negZ3[20] = -2.19794
# 50 sq. ft
GCp_negZ12[50] = -1.6301
GCp_negZ3[50] = -1.40206
# 10 sq. ft
P_negZ12[10] = -37.4303 pounds_per_sq_foot
P_negZ3[10] = -59.3309 pounds_per_sq_foot
# 100 sq. ft
GCp_negZ12[100] = -1.6
GCp_negZ3[100] = -0.8
# 20 sq. ft
P_negZ12[20] = -36.8309 pounds_per_sq_foot
P_negZ3[20] = -47.3441 pounds_per_sq_foot
# 200 sq. ft
GCp_negZ12[200] = -1.38466
GCp_negZ3[200] = -0.8
# 50 sq. ft
P_negZ12[50] = -36.0386 pounds_per_sq_foot
P_negZ3[50] = -31.4984 pounds_per_sq_foot
# 300 sq. ft
GCp_negZ12[300] = -1.2587
GCp_negZ3[300] = -0.8
# 100 sq. ft
P_negZ12[100] = -35.4393 pounds_per_sq_foot
P_negZ3[100] = -19.5115 pounds_per_sq_foot
# 500 sq. ft
GCp_negZ12[500] = -1.1
GCp_negZ3[500] = -0.8
# 200 sq. ft
P_negZ12[200] = -31.152 pounds_per_sq_foot
P_negZ3[200] = -19.5115 pounds_per_sq_foot
# 300 sq. ft
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P_negZ12[300] = -28.644 pounds_per_sq_foot
P_negZ3[300] = -19.5115 pounds_per_sq_foot
# 500 sq. ft
P_negZ12[500] = -25.4844 pounds_per_sq_foot
P_negZ3[500] = -19.5115 pounds_per_sq_foot
# Corner Zone Dimensions, a
a := max(min(0.1*L, 0.4*h), max(3, 0.04*L)) = 12 ft
# REVISION HISTORY:
# 1) Made by John who knows when (probably in prehistoric ages)
# 2) Reviewed by JC, 3/1/2017
