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psf := 1.0
mph := 1.0
ft := 1.0
## Wind Loading for Components and Cladding
# Design According to ASCE7-05 for Monoslope Free Roofs θ<=45 Deg
z_gB := 1200
z_gC := 900
z_gD := 700
α_B := 7.0
α_C := 9.5
α_D := 11.5
# Basic Wind Speed
V := 90*mph
# 1
# Mean Roof Height
h := 16*ft
2
# Building Category
Cat := "IV"
# (Table 1-1)
3
# Exposure
Exp := "C"  # (Section 6.5.6)
h_1 := max(15, h)
h_2 := max(30, h)
h_3 := max(15, h)
# Wind Flow
K_hB := 2.01*(h_2/z_gB)^(2/α_B) = 0.700591
K_hC := 2.01*(h_1/z_gC)^(2/α_C) = 0.860497
K_hD := 2.01*(h_3/z_gD)^(2/α_D) = 1.04186
Flow := "Clear"  # (Section 6-2)
I_w := if(Cat == "II", 1.0, 1.15)
# Least Horizontal Dimension
L := 26*ft
K_h := if(Exp == "B", K_hB, if(Exp == "C", K_hC, if(Exp == "D", K_hD, "Check Exp"))) = 0.860497
x := if(Flow == "Clear", 0, 3) = 0
# Wind Importance Factor
I_w = 1.15
# (Section 6.5.5 & Table 6-1)
i := 1 .. 5
# Wind Directionality Factor
K_d := 0.85  # (Section 6.5.4.4 & Table 6-4)
# Velocity Pressure Coefficient
K_h = 0.860497
# (Section 6.5.6.6 & Table 6-3)
θt := [0*deg; 7.5*deg; 15*deg; 30*deg; 45*deg]
CposZ3Clr := [
    2.4, 1.8, 1.2, 1, 0.8, 0.5;
    3.2, 2.4, 1.6, 1.6, 1.2, 0.8;
    3.6, 2.7, 1.8, 2.4, 1.8, 1.2;
    5.2, 3.9, 2.6, 3.2, 2.4, 1.6;
    5.2, 3.9, 2.6, 4.2, 3.2, 2.1
]
CnegZ3Clr := [
    -3.3, -1.7, -1.1, -3.6, -1.8, -1.2;
    -4.2, -2.1, -1.4, -5.1, -2.6, -1.7;
    -3.8, -2.9, -1.9, -4.2, -3.2, -2.1;
    -5.0, -3.8, -2.5, -4.6, -3.5, -2.3;
    -4.6, -3.5, -2.3, -3.8, -2.9, -1.9
]
CposZ2Clr := [
    1.8, 1.8, 1.2, 0.8, 0.8, 0.5;
    2.4, 2.4, 1.6, 1.2, 1.2, 0.8;
    2.7, 2.7, 1.8, 1.8, 1.8, 1.2;
    3.9, 3.9, 2.6, 2.4, 2.4, 1.6;
    3.9, 3.9, 2.6, 3.2, 3.2, 2.1
]
CnegZ2Clr := [
    -1.7, -1.7, -1.1, -1.8, -1.8, -1.2;
    -2.1, -2.1, -1.4, -2.6, -2.6, -1.7;
    -2.9, -2.9, -1.9, -3.2, -3.2, -2.1;
    -3.8, -3.8, -2.5, -3.5, -3.5, -2.3;
    -3.5, -3.5, -2.3, -2.9, -2.9, -1.9
]
CposZ1Clr := [
    1.2, 1.2, 1.2, 0.5, 0.5, 0.5;
    1.6, 1.6, 1.6, 0.8, 0.8, 0.8;
    1.8, 1.8, 1.8, 1.2, 1.2, 1.2;
    2.6, 2.6, 2.6, 1.6, 1.6, 1.6;
    2.6, 2.6, 2.6, 2.1, 2.1, 2.1
]
CnegZ1Clr := [
    -1.1, -1.1, -1.1, -1.2, -1.2, -1.2;
    -1.4, -1.4, -1.4, -1.7, -1.7, -1.7;
    -1.9, -1.9, -1.9, -2.1, -2.1, -2.1;
    -2.5, -2.5, -2.5, -2.3, -2.3, -2.3;
    -2.3, -2.3, -2.3, -1.9, -1.9, -1.9
]
# Topographical Factor
K_zt := 1.0  # (Section 6.5.7.1)
# Roof Angle
θ := 1.2*deg
C_N_pos1_Z3 := linterp(θt, CposZ3Clr[:, 0 + x], θ) = 2.528
# Velocity Pressure
C_N_pos1_Z1 := linterp(θt, CposZ1Clr[:, 0 + x], θ) = 1.264
C_N_pos1_Z2 := linterp(θt, CposZ2Clr[:, 0 + x], θ) = 1.896
q_h := 0.00256*K_h*K_zt*K_d*V^2*I_w = 17.4418 pounds_per_sq_foot  # (Eq. 6-15)
C_N_neg1_Z3 := linterp(θt, CnegZ3Clr[:, 0 + x], θ) = -3.444
# Net Pressure Coefficient, C_N
# Varies based on zone & eff. wind area
# (Figure 6-19A)
C_N_neg1_Z1 := linterp(θt, CnegZ1Clr[:, 0 + x], θ) = -1.148
C_N_neg1_Z2 := linterp(θt, CnegZ2Clr[:, 0 + x], θ) = -1.764
C_N_pos2_Z3 := linterp(θt, CposZ3Clr[:, 1 + x], θ) = 1.896
# Gust Effect Factor
C_N_pos2_Z1 := linterp(θt, CposZ1Clr[:, 1 + x], θ) = 1.264
C_N_pos2_Z2 := linterp(θt, CposZ2Clr[:, 1 + x], θ) = 1.896
G := 0.85  # For Rigid Structures  # (Section 6.5.8.1)
C_N_neg2_Z3 := linterp(θt, CnegZ3Clr[:, 1 + x], θ) = -1.764
# Wind Pressure, P
# P = q_h G C_N
# (Eq. 6-26)
C_N_neg2_Z1 := linterp(θt, CnegZ1Clr[:, 1 + x], θ) = -1.148
C_N_neg2_Z2 := linterp(θt, CnegZ2Clr[:, 1 + x], θ) = -1.764
C_N_pos3_Z3 := linterp(θt, CposZ3Clr[:, 2 + x], θ) = 1.264
# Note:  Wind Pressure Varies by Zone and Effective Wind Area.  See Chart Below.
C_N_pos3_Z1 := linterp(θt, CposZ1Clr[:, 2 + x], θ) = 1.264
C_N_pos3_Z2 := linterp(θt, CposZ2Clr[:, 2 + x], θ) = 1.264
C_N_neg3_Z3 := linterp(θt, CnegZ3Clr[:, 2 + x], θ) = -1.148
# Corner Zone Dimensions, a
C_N_neg3_Z1 := linterp(θt, CnegZ1Clr[:, 2 + x], θ) = -1.148
C_N_neg3_Z2 := linterp(θt, CnegZ2Clr[:, 2 + x], θ) = -1.148
a := max(min(0.1*L, 0.4*h), max(3, 0.04*L)) = 3 ft
P_1negZ1 := q_h*G*C_N_neg1_Z1 = -17.0197 pounds_per_sq_foot
P_2negZ1 := q_h*G*C_N_neg2_Z1 = -17.0197 pounds_per_sq_foot
P_3negZ1 := q_h*G*C_N_neg3_Z1 = -17.0197 pounds_per_sq_foot
P_1negZ2 := q_h*G*C_N_neg1_Z2 = -26.1522 pounds_per_sq_foot
P_2negZ2 := q_h*G*C_N_neg2_Z2 = -26.1522 pounds_per_sq_foot
P_3negZ2 := q_h*G*C_N_neg3_Z2 = -17.0197 pounds_per_sq_foot
P_1negZ3 := q_h*G*C_N_neg1_Z3 = -51.0591 pounds_per_sq_foot
P_2negZ3 := q_h*G*C_N_neg2_Z3 = -26.1522 pounds_per_sq_foot
P_3negZ3 := q_h*G*C_N_neg3_Z3 = -17.0197 pounds_per_sq_foot
a^2 = 9 ft^2
# Effective Wind Area
4*a^2 = 36 ft^2
# Zone
# <=a^2
# >a^2,<=4a^2
# >4a^2
P_1posZ1 := q_h*G*C_N_pos1_Z1 = 18.7395 pounds_per_sq_foot
P_2posZ1 := q_h*G*C_N_pos2_Z1 = 18.7395 pounds_per_sq_foot
P_3posZ1 := q_h*G*C_N_pos3_Z1 = 18.7395 pounds_per_sq_foot
P_1posZ2 := q_h*G*C_N_pos1_Z2 = 28.1092 pounds_per_sq_foot
P_2posZ2 := q_h*G*C_N_pos2_Z2 = 28.1092 pounds_per_sq_foot
P_3posZ2 := q_h*G*C_N_pos3_Z2 = 18.7395 pounds_per_sq_foot
P_1posZ3 := q_h*G*C_N_pos1_Z3 = 37.4789 pounds_per_sq_foot
P_2posZ3 := q_h*G*C_N_pos2_Z3 = 28.1092 pounds_per_sq_foot
P_3posZ3 := q_h*G*C_N_pos3_Z3 = 18.7395 pounds_per_sq_foot
# _______________________________________________________________________________________________
# +Zone 1
P_1posZ1 = 18.7395 pounds_per_sq_foot
P_2posZ1 = 18.7395 pounds_per_sq_foot
P_3posZ1 = 18.7395 pounds_per_sq_foot  # REVISION HISTORY:
# -Zone 1
P_1negZ1 = -17.0197 pounds_per_sq_foot
P_2negZ1 = -17.0197 pounds_per_sq_foot
P_3negZ1 = -17.0197 pounds_per_sq_foot
# 1) Made by John who knows when (probably in prehistoric ages)
# 2) Reviewed by JC, 3/1/2017
# +Zone 2
P_1posZ2 = 28.1092 pounds_per_sq_foot
P_2posZ2 = 28.1092 pounds_per_sq_foot
P_3posZ2 = 18.7395 pounds_per_sq_foot
# -Zone 2
P_1negZ2 = -26.1522 pounds_per_sq_foot
P_2negZ2 = -26.1522 pounds_per_sq_foot
P_3negZ2 = -17.0197 pounds_per_sq_foot
# +Zone 3
P_1posZ3 = 37.4789 pounds_per_sq_foot
P_2posZ3 = 28.1092 pounds_per_sq_foot
P_3posZ3 = 18.7395 pounds_per_sq_foot
# -Zone 3
P_1negZ3 = -51.0591 pounds_per_sq_foot
P_2negZ3 = -26.1522 pounds_per_sq_foot
P_3negZ3 = -17.0197 pounds_per_sq_foot
