## Snow Loads
# Design According to NYC Building Code, based on ASCE7-05 Chapter 7
p_g := 25*psf
c := psf^-0.25*ft^(2/3)
a := ft^-1
# Ground Snow Load
p_g = 25 pounds_per_sq_foot  # (Section 1608.2)
# Building Category
Cat := "III"
# (Table 1604.5)
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I_s := if(Cat == "I", 0.8, if(Cat == "II", 1.0, if(Cat == "III", 1.1, 1.2)))
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# Exposure Factor
C_e := 1.0  # (Table 1608.3.1)
# Thermal Factor
C_t := 1.2  # (Table 1608.3.2)
# Snow Importance Factor
I_s = 1.1  # (Table 1604.5.2)
# Roof Slope Factor
C_s := 1.0  # (Figure 7-2)
# Windward Drift Length
l_uw := 11 ft
# Leeward Drift Length
l_ul := 0 ft
# Parapit Height
PAR := 0 ft
# Flat Roof Snow Load
p_f := 0.7*C_e*C_t*I_s*p_g = 23.1 pounds_per_sq_foot  # (Eq. 7.3-1)
# Minimum Flat Roof Snow Load
p_fmin := if(p_g ≤ 20 psf, I_s*p_g, 20 psf*I_s) = 22 pounds_per_sq_foot  # (Sect. 7.3.4)
# (pf for Low-Sloped Roofs, See ASCE Section 7.3.4 to see where minimum values on apply)
# Rain-On-Snow Surcharge Load
ROS := if(p_g ≤ 20 psf, 5 psf, 0 psf) = 0 pounds_per_sq_foot
# (Sect. 7.10)
p_g*I_s = 27.5 pounds_per_sq_foot
# (ROS for Low-Sloped Roofs, See ASCE Section 7.10 to see where Rain-On-Snow Surchage Loads apply)
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# Uniform Snow Load
SL_unif := max(p_f, p_fmin) = 23.1 pounds_per_sq_foot  # REVISION HISTORY:
# 1) Made by John who knows when (probably in prehistoric ages)
# 2) Reviewed by JC, 3/1/2017
# Uniform Snow Load with Rain
SL_ROS := SL_unif + ROS = 23.1 pounds_per_sq_foot
# Drifts on Lower Roofs (Aerodynamic Shade) per ASCE7 Section 7.7
# Windward Drift Height | c = constant for unit cancelation
h_dwind := (0.43*c*nthroot(l_uw, 3)*nthroot((p_g + 10*psf), 4) - 1.5 ft)*0.75 = 0.619527 ft  # (Figure 7-9)
# (Note use 3/4 of Drift Height for windward drifts per Section 7.7.1)
# Leeward Drift Height | c = constant for unit cancelation
h_dlee := (0.43*c*nthroot(l_ul, 3)*nthroot((p_g + 10*psf), 4) - 1.5 ft) - PAR = -1.5 ft  # (Figure 7-9)
# Snow Density
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γ := 0.13*p_g*a + 14 pcf = 17.25 pounds_per_cubic_foot  # (Eq. 7.7-1)
# a = constant for unit cancelation
# Drift Surcharge Load
h_d := max(h_dwind, h_dlee) = 0.619527 ft
p_d := h_d*γ = 10.6868 pounds_per_sq_foot
# Total Drift Load
SL_drift := p_d + SL_unif = 33.7868 pounds_per_sq_foot
# Drift Length
w := 4*max(h_dwind, h_dlee) = 2.47811 ft
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SL_drift = 33.7868 pounds_per_sq_foot
# Snow Drift at Various Point From the End
Length := 65 in
SL_unif = 23.1 pounds_per_sq_foot
SL_dist := if(Length < w, SL_drift - ((p_d/w)*Length), SL_unif) = 23.1 pounds_per_sq_foot  # SL with Uniform Load
DriftHeight := SL_dist*γ^-1 = 1.33913 ft  # Drift Height with Uniform Load
w = 2.47811 ft
UniformHeight := SL_unif*γ^-1 = 1.33913 ft  # Height of Uniform Snow
DriftHeight2 := if(Length < w, h_d - ((h_d/w)*Length), 0) = 0  # Drift Height without Unif. Load
SL_driftLength := SL_dist - SL_unif = 0 pounds_per_sq_foot  # Snow Load without Unif. Load
SL_ROS = 23.1 pounds_per_sq_foot
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