psf := 1.0
mph := 1.0
ft := 1.0
V := 98*mph
## Wind Loading for Components and Cladding
# Design According to NYC Building Code, based on ASCE7-05 for Solid Freestanding Walls & Solid Signs
z_gB := 1200
z_gC := 900
z_gD := 700
α_B := 7.0
α_C := 9.5
α_D := 11.5
# Basic Wind Speed
V = 98 mph  # (Section 1609.3)
# Height of Sign off Ground
h := 22*ft
h_1 := max(15, h)
h_2 := max(15, h)
h_3 := max(15, h)
# Horizontal Dimension of Sign
B := 7.33*ft
# Vertical Dimension of Sign
s := 3.7*ft
# Building Category
Cat := "IV"
# (Table 1604.5)
K_zB := 2.01*(h_2/z_gB)^(2/α_B) = 0.641179
K_zC := 2.01*(h_1/z_gC)^(2/α_C) = 0.920165
K_zD := 2.01*(h_3/z_gD)^(2/α_D) = 1.10119
I_w := if(Cat == "II", 1.0, 1.15)
# Exposure
Exp := "C"  # (Section 1609.4)
# (Table 1604.5.2)
K_h := if(Exp == "B", K_zB, if(Exp == "C", K_zC, if(Exp == "D", K_zD, "Check Exp")))
# Wind Importance Factor
I_w = 1.15
# Wind Directionality Factor
K_d := 0.85
# (Section 6.5.4.4 & Table 6-4)
i := 1 .. 5
# (Section 6.5.6.6 & Table 6-3)
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# Velocity Pressure Coefficient
K_h = 0.920165
# Topographical Factor
K_zt := 1.0  # (Section 6.5.7.1)
# Velocity Pressure
q_h := 0.00256*K_h*K_zt*K_d*V^2*I_w = 22.1144 pounds_per_sq_foot  # (Eq. 6-15)
# Aspect Ratio, B/s
B/s = 1.98108
# Clearance Ratio, s/h
s/h = 0.168182
# Net Pressure Coefficient, C_f
C_f := 1.8  # (Figure 6-20)
# Gust Effect Factor
G := 0.85  # For Rigid Structures  # (Section 6.5.8.1)
# Wind Pressure, P
P := q_h*G*C_f = 33.835 pounds_per_sq_foot
# (Eq. 6-27)
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# REVISION HISTORY:
# 1) Made by John who knows when (probably in prehistoric ages)
# 2) Reviewed by JC, 3/1/2017
