## Wind Loading for Components and Cladding
psf := 1.0
mph := 1.0
ft := 1.0
V := 98*mph
z_gB := 1200
z_gC := 900
z_gD := 700
α_B := 7.0
α_C := 9.5
α_D := 11.5
# Design According to NYC Building Code, based on ASCE7-05 for Gable Roofs for 0<θ<=7 and h<= 60ft
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# Basic Wind Speed
V = 98 mph  # (Section 1609.3)
# Mean Roof Height
h := 58*ft
# Building Category
Cat := "III"  # (Table 1604.5)
# Exposure
Exp := "C"
# (Section 1609.4)
h_1 := max(15, h)
h_2 := max(30, h)
h_3 := max(15, h)
# Enclosure Classification
K_hB := 2.01*(h_2/z_gB)^(2/α_B) = 0.845798
K_hC := 2.01*(h_1/z_gC)^(2/α_C) = 1.12849
K_hD := 2.01*(h_3/z_gD)^(2/α_D) = 1.30341
Enc := "Enclosed"  # (Section 1609.2)
# Least Horizontal Dimension
L := 60*ft
K_h := if(Exp == "B", K_hB, if(Exp == "C", K_hC, if(Exp == "D", K_hD, "Check Exp"))) = 1.12849
I_w := if(Cat == "II", 1.0, 1.15)
# Wind Importance Factor
I_w = 1.15
# (Table 1604.5.2)
GC_pi := if(Enc == "Enclosed", 0.18, if(Enc == "Open", 0.0, 0.55)) = 0.18
# Wind Directionality Factor
K_d := 0.85
# (Section 6.5.4.4 & Table 6-4)
EWA := 1 .. 1000
GCp3n_100 := -1.1
GCp2n_10 := -1.8
GCp2n_100 := -1.1
GCp3n_10 := -2.8
# Velocity Pressure Coefficient
GCp123_100 := 0.2
GCp1n_10 := -1.0
GCp1n_100 := -0.9
K_h = 1.12849  # (Section 6.5.6.6 & Table 6-3)
GCp123_10 := 0.3
# Topographical Factor
K_zt := 1.0
# (Section 6.5.7.1)
GCp_posZ123[EWA] := if(EWA ≤ 10, GCp123_10, if(EWA ≥ 100, GCp123_100, GCp123_10 + (GCp123_100 - GCp123_10)*(log(EWA) - log(10))/(log(100) - log(10))))
# Velocity Pressure
q_h := 0.00256*K_h*K_zt*K_d*V^2*I_w = 27.1211 pounds_per_sq_foot
# (Eq. 6-15)
P_posZ[EWA] := q_h*(GCp_posZ123[EWA] - (-GC_pi))
# Internal Pressure Coefficient
GC_pi = 0.18
# (Figure 6-5)
GCp_negZ1[EWA] := if(EWA ≤ 10, GCp1n_10, if(EWA ≥ 100, GCp1n_100, GCp1n_10 + (GCp1n_100 - GCp1n_10)*(log(EWA) - log(10))/(log(100) - log(10))))
# External Pressure Coefficient, GC_p
# Varies based on zone & eff. wind area
# (Figure 6-11B)
P_negZ1[EWA] := q_h*(GCp_negZ1[EWA] - GC_pi)
# Wind Pressure, P | P = q_h (GC_p - GC_pi) | (Eq. 6-22)
# Note:  Wind Pressure Varies by Zone and Effective Wind Area.  See Chart Below for External Pressure Coefficients from Figure 6-11C
GCp_negZ2[EWA] := if(EWA ≤ 10, GCp2n_10, if(EWA ≥ 100, GCp2n_100, GCp2n_10 + (GCp2n_100 - GCp2n_10)*(log(EWA) - log(10))/(log(100) - log(10))))
P_negZ2[EWA] := q_h*(GCp_negZ2[EWA] - GC_pi)
# EWA | + Zone 1,2, & 3 | - Zone 1 | - Zone 2 | - Zone 3
GCp_negZ3[EWA] := if(EWA ≤ 10, GCp3n_10, if(EWA ≥ 100, GCp3n_100, GCp3n_10 + (GCp3n_100 - GCp3n_10)*(log(EWA) - log(10))/(log(100) - log(10))))
# 10 sq. ft
GCp_posZ123[10] = 0.3
GCp_negZ1[10] = -1
GCp_negZ2[10] = -1.8
GCp_negZ3[10] = -2.8
P_negZ3[EWA] := q_h*(GCp_negZ3[EWA] - GC_pi)
# 25 sq. ft
GCp_posZ123[25] = 0.260206
GCp_negZ1[25] = -0.960206
GCp_negZ2[25] = -1.52144
GCp_negZ3[25] = -2.1235
# 50 sq. ft
GCp_posZ123[50] = 0.230103
GCp_negZ1[50] = -0.930103
GCp_negZ2[50] = -1.31072
GCp_negZ3[50] = -1.61175
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# 100 sq. ft
GCp_posZ123[100] = 0.2
GCp_negZ1[100] = -0.9
GCp_negZ2[100] = -1.1
GCp_negZ3[100] = -1.1
# EWA | + Zone 1,2 & 3 | - Zone 1 | - Zone 2 | - Zone 3
# 10 sq. ft
P_posZ[10] = 13.0181 pounds_per_sq_foot
P_negZ1[10] = -32.0029 pounds_per_sq_foot
P_negZ2[10] = -53.6998 pounds_per_sq_foot
P_negZ3[10] = -80.8208 pounds_per_sq_foot
# 25 sq. ft
P_posZ[25] = 11.9389 pounds_per_sq_foot
P_negZ1[25] = -30.9236 pounds_per_sq_foot
P_negZ2[25] = -46.145 pounds_per_sq_foot
P_negZ3[25] = -62.4735 pounds_per_sq_foot
# 50 sq. ft
P_posZ[50] = 11.1224 pounds_per_sq_foot
P_negZ1[50] = -30.1072 pounds_per_sq_foot
P_negZ2[50] = -40.43 pounds_per_sq_foot
P_negZ3[50] = -48.5942 pounds_per_sq_foot
# 100 sq. ft
P_posZ[100] = 10.306 pounds_per_sq_foot
P_negZ1[100] = -29.2908 pounds_per_sq_foot
P_negZ2[100] = -34.715 pounds_per_sq_foot
P_negZ3[100] = -34.715 pounds_per_sq_foot
# Corner Zone Dimensions, a
a := max(min(0.1*L, 0.4*h), max(3, 0.04*L)) = 6 ft
# REVISION HISTORY:
# 1) Made by John who knows when (probably in prehistoric ages)
# 2) Reviewed by JC, 3/1/2017
