psf := 1.0
mph := 1.0
ft := 1.0
V := 98*mph
## Wind Loading for Components and Cladding
# Design According to NYC Building Code, based on ASCE7-05 for Gable Roofs for 7<θ<=27 and h<= 60ft
z_gB := 1200
z_gC := 900
z_gD := 700
α_B := 7.0
α_C := 9.5
α_D := 11.5
# Basic Wind Speed
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V = 98 mph  # (Section 1609.3)
# Mean Roof Height
h := 58*ft
# Building Category
Cat := "III"  # (Table 1604.5)
h_1 := max(15, h)
h_2 := max(30, h)
h_3 := max(15, h)
# Exposure
Exp := "C"
# (Section 1609.4)
K_hB := 2.01*(h_2/z_gB)^(2/α_B) = 0.845798
K_hC := 2.01*(h_1/z_gC)^(2/α_C) = 1.12849
K_hD := 2.01*(h_3/z_gD)^(2/α_D) = 1.30341
# (Section 1609.2)
I_w := if(Cat == "II", 1.0, 1.15)
# Enclosure Classification
Enc := "Enclosed"
K_h := if(Exp == "B", K_hB, if(Exp == "C", K_hC, if(Exp == "D", K_hD, "Check Exp"))) = 1.12849
# Least Horizontal Dimension
L := 60*ft
# Wind Importance Factor
I_w = 1.15
# (Table 1604.5.2)
GC_pi := if(Enc == "Enclosed", 0.18, if(Enc == "Open", 0.0, 0.55)) = 0.18
# Wind Directionality Factor
K_d := 0.85
# (Section 6.5.4.4 & Table 6-4)
EWA := 1 .. 1000
GCp3n_100 := -2.0
GCp2n_10 := -1.7
GCp2n_100 := -1.2
GCp3n_10 := -2.6
GCp123_100 := 0.3
GCp1n_10 := -0.9
GCp1n_100 := -0.8
# Velocity Pressure Coefficient
GCp123_10 := 0.5
K_h = 1.12849  # (Section 6.5.6.6 & Table 6-3)
# (Section 6.5.7.1)
GCp_posZ123[EWA] := if(EWA ≤ 10, GCp123_10, if(EWA ≥ 100, GCp123_100, GCp123_10 + (GCp123_100 - GCp123_10)*(log(EWA) - log(10))/(log(100) - log(10))))
# Topographical Factor
K_zt := 1.0
# Velocity Pressure
q_h := 0.00256*K_h*K_zt*K_d*V^2*I_w = 27.1211 pounds_per_sq_foot
# (Eq. 6-15)
P_posZ[EWA] := q_h*(GCp_posZ123[EWA] - (-GC_pi))
# Internal Pressure Coefficient
GC_pi = 0.18
# (Figure 6-5)
GCp_negZ1[EWA] := if(EWA ≤ 10, GCp1n_10, if(EWA ≥ 100, GCp1n_100, GCp1n_10 + (GCp1n_100 - GCp1n_10)*(log(EWA) - log(10))/(log(100) - log(10))))
# External Pressure Coefficient, GC_p
# Varies based on zone & eff. wind area
# (Figure 6-11C)
P_negZ1[EWA] := q_h*(GCp_negZ1[EWA] - GC_pi)
# Wind Pressure, P | P = q_h (GC_p - GC_pi) | (Eq. 6-22)
# Note:  Wind Pressure Varies by Zone and Effective Wind Area.  See Chart Below for External Pressure Coefficients from Figure 6-11C
GCp_negZ2[EWA] := if(EWA ≤ 10, GCp2n_10, if(EWA ≥ 100, GCp2n_100, GCp2n_10 + (GCp2n_100 - GCp2n_10)*(log(EWA) - log(10))/(log(100) - log(10))))
P_negZ2[EWA] := q_h*(GCp_negZ2[EWA] - GC_pi)
# EWA
# + Zone 1,2, & 3
# - Zone 1
# - Zone 2
# - Zone 3
GCp_negZ3[EWA] := if(EWA ≤ 10, GCp3n_10, if(EWA ≥ 100, GCp3n_100, GCp3n_10 + (GCp3n_100 - GCp3n_10)*(log(EWA) - log(10))/(log(100) - log(10))))
# 10 sq. ft
GCp_posZ123[10] = 0.5
GCp_negZ1[10] = -0.9
GCp_negZ2[10] = -1.7
GCp_negZ3[10] = -2.6
P_negZ3[EWA] := q_h*(GCp_negZ3[EWA] - GC_pi)
# 25 sq. ft
GCp_posZ123[25] = 0.420412
GCp_negZ1[25] = -0.860206
GCp_negZ2[25] = -1.50103
GCp_negZ3[25] = -2.36124
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# 50 sq. ft
GCp_posZ123[50] = 0.360206
GCp_negZ1[50] = -0.830103
GCp_negZ2[50] = -1.35051
GCp_negZ3[50] = -2.18062
# 100 sq. ft
GCp_posZ123[100] = 0.3
GCp_negZ1[100] = -0.8
GCp_negZ2[100] = -1.2
GCp_negZ3[100] = -2
# EWA | + Zone 1,2 & 3 | - Zone 1 | - Zone 2 | - Zone 3
# 10 sq. ft
P_posZ[10] = 18.4423 pounds_per_sq_foot
P_negZ1[10] = -29.2908 pounds_per_sq_foot
P_negZ2[10] = -50.9877 pounds_per_sq_foot
P_negZ3[10] = -75.3966 pounds_per_sq_foot
# 25 sq. ft
P_posZ[25] = 16.2838 pounds_per_sq_foot
P_negZ1[25] = -28.2115 pounds_per_sq_foot
P_negZ2[25] = -45.5914 pounds_per_sq_foot
P_negZ3[25] = -68.9211 pounds_per_sq_foot
# 50 sq. ft
P_posZ[50] = 14.651 pounds_per_sq_foot
P_negZ1[50] = -27.3951 pounds_per_sq_foot
P_negZ2[50] = -41.5092 pounds_per_sq_foot
P_negZ3[50] = -64.0225 pounds_per_sq_foot
# 100 sq. ft
P_posZ[100] = 13.0181 pounds_per_sq_foot
P_negZ1[100] = -26.5787 pounds_per_sq_foot
P_negZ2[100] = -37.4271 pounds_per_sq_foot
P_negZ3[100] = -59.124 pounds_per_sq_foot
# Corner Zone Dimensions, a
a := max(min(0.1*L, 0.4*h), max(3, 0.04*L)) = 6 ft
# REVISION HISTORY:
# 1) Made by John who knows when (probably in prehistoric ages)
# 2) Reviewed by JC, 3/1/2017
