## Wind Loading for Components and Cladding
psf := 1.0
mph := 1.0
ft := 1.0
V := 98*mph
z_gB := 1200
z_gC := 900
z_gD := 700
α_B := 7.0
α_C := 9.5
α_D := 11.5
# Design According to NYC Building Code, based on ASCE7-05 for Gable Roof Overhangs w/ θ <= 7 deg and h<= 60ft
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# Basic Wind Speed
V = 98 mph  # (Section 1609.3)
# Mean Roof Height
h := 30*ft
# Building Category
Cat := "III"  # (Table 1604.5)
# Exposure
Exp := "C"
h_1 := max(15, h)
h_2 := max(30, h)
h_3 := max(15, h)
# (Section 1609.4)
K_hB := 2.01*(h_2/z_gB)^(2/α_B) = 0.700591
K_hC := 2.01*(h_1/z_gC)^(2/α_C) = 0.982253
K_hD := 2.01*(h_3/z_gD)^(2/α_D) = 1.16222
# Enclosure Classification
Enc := "Enclosed"
# (Section 1609.2)
I_w := if(Cat == "II", 1.0, 1.15)
# Least Horizontal Dimension
L := 130*ft
K_h := if(Exp == "B", K_hB, if(Exp == "C", K_hC, if(Exp == "D", K_hD, "Check Exp"))) = 0.982253
# Wind Importance Factor
I_w = 1.15
# (Table 1604.5.2)
GC_pi := if(Enc == "Enclosed", 0.18, if(Enc == "Open", 0.0, 0.55)) = 0.18
# Wind Directionality Factor
K_d := 0.85
# (Section 6.5.4.4 & Table 6-4)
EWA := 1 .. 1000
GCp3n_10 := -2.8
GCp3n_100 := -0.8
# Velocity Pressure Coefficient
GCp12_100 := -1.6
GCp12_500 := -1.1
K_h = 0.982253  # (Section 6.5.6.6 & Table 6-3)
GCp12_10 := -1.7
# Topographical Factor
K_zt := 1.0
# (Section 6.5.7.1)
GCp_negZ12[EWA] := if(EWA ≤ 10, GCp12_10, if(EWA ≥ 500, GCp12_500, if(EWA ≥ 100, GCp12_100 + (GCp12_500 - GCp12_100)*(log(EWA) - log(100))/(log(500) - log(100)), GCp12_10 + (GCp12_100 - GCp12_10)*(log(EWA) - log(10))/(log(100) - log(10)))))
# Velocity Pressure
q_h := 0.00256*K_h*K_zt*K_d*V^2*I_w = 23.6065 pounds_per_sq_foot
# (Eq. 6-15)
P_negZ12[EWA] := q_h*(GCp_negZ12[EWA] - GC_pi)
# Internal Pressure Coefficient
GC_pi = 0.18
# (Figure 6-5)
GCp_negZ3[EWA] := if(EWA ≤ 10, GCp3n_10, if(EWA ≥ 100, GCp3n_100, GCp3n_10 + (GCp3n_100 - GCp3n_10)*(log(EWA) - log(10))/(log(100) - log(10))))
# External Pressure Coefficient, GC_p
# Varies based on zone & eff. wind area
# (Figure 6-11B)
P_negZ3[EWA] := q_h*(GCp_negZ3[EWA] - GC_pi)
# Wind Pressure, P | P = q_h (GC_p - GC_pi) | (Eq. 6-22)
# Effective Wind
# Area
# - Zone 1 & 2
# - Zone 3
# Note:  Wind Pressure Varies by Zone and Effective Wind Area.  See Chart Below.
# 10 sq. ft
GCp_negZ12[10] = -1.7
GCp_negZ3[10] = -2.8
# Effective Wind
# Area
# - Zone 1 & 2
# - Zone 3
# 20 sq. ft
GCp_negZ12[20] = -1.6699
GCp_negZ3[20] = -2.19794
# 10 sq. ft
P_negZ12[10] = -44.3803 pounds_per_sq_foot
P_negZ3[10] = -70.3474 pounds_per_sq_foot
# 50 sq. ft
GCp_negZ12[50] = -1.6301
GCp_negZ3[50] = -1.40206
# 20 sq. ft
P_negZ12[20] = -43.6696 pounds_per_sq_foot
P_negZ3[20] = -56.1349 pounds_per_sq_foot
# 100 sq. ft
GCp_negZ12[100] = -1.6
GCp_negZ3[100] = -0.8
# 50 sq. ft
P_negZ12[50] = -42.7302 pounds_per_sq_foot
P_negZ3[50] = -37.3469 pounds_per_sq_foot
# 200 sq. ft
GCp_negZ12[200] = -1.38466
GCp_negZ3[200] = -0.8
# 100 sq. ft
P_negZ12[100] = -42.0196 pounds_per_sq_foot
P_negZ3[100] = -23.1344 pounds_per_sq_foot
# 300 sq. ft
GCp_negZ12[300] = -1.2587
GCp_negZ3[300] = -0.8
# 200 sq. ft
P_negZ12[200] = -36.9362 pounds_per_sq_foot
P_negZ3[200] = -23.1344 pounds_per_sq_foot
# 500 sq. ft
GCp_negZ12[500] = -1.1
GCp_negZ3[500] = -0.8
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# 300 sq. ft
P_negZ12[300] = -33.9626 pounds_per_sq_foot
P_negZ3[300] = -23.1344 pounds_per_sq_foot
# 500 sq. ft
P_negZ12[500] = -30.2164 pounds_per_sq_foot
P_negZ3[500] = -23.1344 pounds_per_sq_foot
# Corner Zone Dimensions, a
a := max(min(0.1*L, 0.4*h), max(3, 0.04*L)) = 12 ft
# REVISION HISTORY:
# 1) Made by John who knows when (probably in prehistoric ages)
# 2) Reviewed by JC, 3/1/2017
