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## Wind Loading for Components and Cladding
psf := 1.0
mph := 1.0
ft := 1.0
V := 98*mph
# Design According to NYC Building Code, based on ASCE7-05 for Roofs w/ h> 60ft
z_gB := 1200
z_gC := 900
z_gD := 700
α_B := 7.0
α_C := 9.5
α_D := 11.5
# Basic Wind Speed
V = 98 mph  # (Section 1609.3)
# Mean Roof Height
h := 73*ft
h_1 := max(15, h)
h_2 := max(30, h)
h_3 := max(15, h)
# Height of Component Above Ground
z := 73*ft
z_1 := max(15, z)
z_2 := max(30, z)
z_3 := max(15, z)
# Building Category
Cat := "III"  # (Table 1604.5)
# Exposure
Exp := "C"
# (Section 1609.4)
K_hB := 2.01*(h_2/z_gB)^(2/α_B) = 0.90325
K_hC := 2.01*(h_1/z_gC)^(2/α_C) = 1.18448
K_hD := 2.01*(h_3/z_gD)^(2/α_D) = 1.3566
I_w := if(Cat == "II", 1.0, 1.15)
# Enclosure Classification
Enc := "Enclosed"
# (Section 1609.2)
K_zB := 2.01*(z_2/z_gB)^(2/α_B) = 0.90325
K_zC := 2.01*(z_1/z_gC)^(2/α_C) = 1.18448
K_zD := 2.01*(z_3/z_gD)^(2/α_D) = 1.3566
K_h := if(Exp == "B", K_hB, if(Exp == "C", K_hC, if(Exp == "D", K_hD, "Check Exp"))) = 1.18448
# Least Horizontal Dimension
L := 60*ft
# (Table 1604.5.2)
K_z := if(Exp == "B", K_zB, if(Exp == "C", K_zC, if(Exp == "D", K_zD, "Check Exp"))) = 1.18448
# Wind Importance Factor
I_w = 1.15
GC_pi := if(Enc == "Enclosed", 0.18, if(Enc == "Open", 0.0, 0.55)) = 0.18
# Wind Directionality Factor
K_d := 0.85
# (Section 6.5.4.4 & Table 6-4)
EWA := 1 .. 1000
GCp3_10 := -3.2
GCp3_500 := -2.3
# Velocity Pressure Coefficient @ h
K_h = 1.18448
# (Section 6.5.6.6 & Table 6-3)
GCp1_10 := -1.4
GCp1_500 := -0.9
GCp2_10 := -2.3
GCp2_500 := -1.6
# Velocity Pressure Coefficient @ z
K_z = 1.18448  # (Section 6.5.6.6 & Table 6-3)
# Topographical Factor
K_zt := 1.0  # (Section 6.5.7.1)
# Velocity Pressure at Height, h
q_h := 0.00256*K_h*K_zt*K_d*V^2*I_w = 28.4667 pounds_per_sq_foot  # (Eq. 6-15)
# Velocity Pressure at Height, z
q_z := 0.00256*K_z*K_zt*K_d*V^2*I_w = 28.4667 pounds_per_sq_foot  # (Eq. 6-15)
GCp_negZ1[EWA] := if(EWA ≤ 10, GCp1_10, if(EWA ≥ 500, GCp1_500, GCp1_10 + (GCp1_500 - GCp1_10)*(log(EWA) - log(10))/(log(500) - log(10))))
GCp_negZ2[EWA] := if(EWA ≤ 10, GCp2_10, if(EWA ≥ 500, GCp2_500, GCp2_10 + (GCp2_500 - GCp2_10)*(log(EWA) - log(10))/(log(500) - log(10))))
# Internal Pressure Coefficient
GC_pi = 0.18  # (Figure 6-5)
P_negZ1[EWA] := q_h*GCp_negZ1[EWA] - q_h*GC_pi
P_negZ2[EWA] := q_h*GCp_negZ2[EWA] - q_h*GC_pi  # Note qi is conservatively taken as qh
# External Pressure Coefficient, GC_p | Varies based on zone & eff. wind area | (Figure 6-17)
# Wind Pressure, P
# P = q (GC_p)- q_i (GC_pi)
# (Eq. 6-23)
GCp_negZ3[EWA] := if(EWA ≤ 10, GCp3_10, if(EWA ≥ 500, GCp3_500, GCp3_10 + (GCp3_500 - GCp3_10)*(log(EWA) - log(10))/(log(500) - log(10))))
# Note:  Wind Pressure Varies by Zone and Effective Wind Area.  See Chart Below.
P_negZ3[EWA] := q_h*GCp_negZ3[EWA] - q_h*GC_pi
# Effective Wind
# Area
# - Zone 1
# - Zone 2
# - Zone 3
# REVISION HISTORY:
# 10 sq. ft
GCp_negZ1[10] = -1.4
GCp_negZ2[10] = -2.3
GCp_negZ3[10] = -3.2
# 1) Made by John who knows when (probably in prehistoric ages)
# 2) Reviewed by JC, 3/1/2017
# 50 sq. ft
GCp_negZ1[50] = -1.1943
GCp_negZ2[50] = -2.01201
GCp_negZ3[50] = -2.82973
# 100 sq. ft
GCp_negZ1[100] = -1.1057
GCp_negZ2[100] = -1.88799
GCp_negZ3[100] = -2.67027
# 200 sq. ft
GCp_negZ1[200] = -1.01711
GCp_negZ2[200] = -1.76396
GCp_negZ3[200] = -2.5108
# 300 sq. ft
GCp_negZ1[300] = -0.965289
GCp_negZ2[300] = -1.6914
GCp_negZ3[300] = -2.41752
# 500 sq. ft
GCp_negZ1[500] = -0.9
GCp_negZ2[500] = -1.6
GCp_negZ3[500] = -2.3
# Effective Wind
# Area
# - Zone 1
# - Zone 2
# - Zone 3
# 10 sq. ft
P_negZ1[10] = -44.9774 pounds_per_sq_foot
P_negZ2[10] = -70.5975 pounds_per_sq_foot
P_negZ3[10] = -96.2176 pounds_per_sq_foot
# 50 sq. ft
P_negZ1[50] = -39.1217 pounds_per_sq_foot
P_negZ2[50] = -62.3995 pounds_per_sq_foot
P_negZ3[50] = -85.6773 pounds_per_sq_foot
# 100 sq. ft
P_negZ1[100] = -36.5998 pounds_per_sq_foot
P_negZ2[100] = -58.8688 pounds_per_sq_foot
P_negZ3[100] = -81.1378 pounds_per_sq_foot
# 200 sq. ft
P_negZ1[200] = -34.0779 pounds_per_sq_foot
P_negZ2[200] = -55.3381 pounds_per_sq_foot
P_negZ3[200] = -76.5983 pounds_per_sq_foot
# 300 sq. ft
P_negZ1[300] = -32.6026 pounds_per_sq_foot
P_negZ2[300] = -53.2728 pounds_per_sq_foot
P_negZ3[300] = -73.9429 pounds_per_sq_foot
# 500 sq. ft
P_negZ1[500] = -30.7441 pounds_per_sq_foot
P_negZ2[500] = -50.6708 pounds_per_sq_foot
P_negZ3[500] = -70.5975 pounds_per_sq_foot
# Corner Zone Dimensions, a
a := max(0.10*L, 3*ft) = 6 ft
