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## Wind Loading for Components and Cladding
psf := 1.0
mph := 1.0
ft := 1.0
V := 98*mph
# Design According to NYC Building Code, based on ASCE7-05 for Walls w/ h> 60ft
z_gB := 1200
z_gC := 900
z_gD := 700
α_B := 7.0
α_C := 9.5
α_D := 11.5
# Basic Wind Speed
V = 98 mph  # (Section 1609.3)
# Mean Roof Height
h := 570*ft
h_1 := max(15, h)
h_2 := max(30, h)
h_3 := max(15, h)
# Height of Component Above Ground
z := 13*ft
z_1 := max(15, z)
z_2 := max(30, z)
z_3 := max(15, z)
# Building Category
Cat := "II"  # (Table 1604.5)
# Exposure
Exp := "C"
# (Section 1609.4)
K_hB := 2.01*(h_2/z_gB)^(2/α_B) = 1.62489
K_hC := 2.01*(h_1/z_gC)^(2/α_C) = 1.82572
K_hD := 2.01*(h_3/z_gD)^(2/α_D) = 1.93945
# Enclosure Classification
Enc := "Enclosed"
# (Section 1609.2)
K_zB := 2.01*(z_2/z_gB)^(2/α_B) = 0.700591
K_zC := 2.01*(z_1/z_gC)^(2/α_C) = 0.848884
K_zD := 2.01*(z_3/z_gD)^(2/α_D) = 1.03023
I_w := if(Cat == "II", 1.0, 1.15)
# Least Horizontal Dimension
L := 100*ft
K_h := if(Exp == "B", K_hB, if(Exp == "C", K_hC, if(Exp == "D", K_hD, "Check Exp"))) = 1.82572
# (Table 1604.5.2)
K_z := if(Exp == "B", K_zB, if(Exp == "C", K_zC, if(Exp == "D", K_zD, "Check Exp"))) = 0.848884
# Wind Importance Factor
I_w = 1
GC_pi := if(Enc == "Enclosed", 0.18, if(Enc == "Open", 0.0, 0.55)) = 0.18
# Wind Directionality Factor
K_d := 0.85
# (Section 6.5.4.4 & Table 6-4)
EWA := 1 .. 1000
GCp5n_20 := -1.8
GCp5n_500 := -1.0
# Velocity Pressure Coefficient @ h
K_h = 1.82572
# (Section 6.5.6.6 & Table 6-3)
GCp45_20 := 0.9
GCp45_500 := 0.6
GCp4n_20 := -0.9
GCp4n_500 := -0.7
# Velocity Pressure Coefficient @ z
K_z = 0.848884  # (Section 6.5.6.6 & Table 6-3)
# Topographical Factor
K_zt := 1.0  # (Section 6.5.7.1)
# Velocity Pressure at Height, h
q_h := 0.00256*K_h*K_zt*K_d*V^2*I_w = 38.1545 pounds_per_sq_foot  # (Eq. 6-15)
# Velocity Pressure at Height, z
q_z := 0.00256*K_z*K_zt*K_d*V^2*I_w = 17.7402 pounds_per_sq_foot  # (Eq. 6-15)
GCp_negZ4[EWA] := if(EWA ≤ 20, GCp4n_20, if(EWA ≥ 500, GCp4n_500, GCp4n_20 + (GCp4n_500 - GCp4n_20)*(log(EWA) - log(20))/(log(500) - log(20))))
GCp_posZ45[EWA] := if(EWA ≤ 20, GCp45_20, if(EWA ≥ 500, GCp45_500, GCp45_20 + (GCp45_500 - GCp45_20)*(log(EWA) - log(20))/(log(500) - log(20))))
# Internal Pressure Coefficient
GC_pi = 0.18  # (Figure 6-5)
P_negZ4[EWA] := q_h*GCp_negZ4[EWA] - q_h*GC_pi
P_posZ45[EWA] := q_z*GCp_posZ45[EWA] - (-q_h*GC_pi)  # Note qi is conservatively taken as qh
# External Pressure Coefficient, GC_p | Varies based on zone & eff. wind area | (Figure 6-17)
# Wind Pressure, P
# P = q (GC_p)- q_i (GC_pi)
# (Eq. 6-23)
GCp_negZ5[EWA] := if(EWA ≤ 20, GCp5n_20, if(EWA ≥ 500, GCp5n_500, GCp5n_20 + (GCp5n_500 - GCp5n_20)*(log(EWA) - log(20))/(log(500) - log(20))))
# Note:  Wind Pressure Varies by Zone and Effective Wind Area.  See Chart Below.
P_negZ5[EWA] := q_h*GCp_negZ5[EWA] - q_h*GC_pi
# Effective Wind
# Area
# + Zone 4 & 5
# - Zone 4
# - Zone 5
# REVISION HISTORY:
# 1) Made by John who knows when (probably in prehistoric ages)
# 2) Reviewed by JC, 3/1/2017
# 20 sq. ft
GCp_posZ45[20] = 0.9
GCp_negZ4[20] = -0.9
GCp_negZ5[20] = -1.8
# 50 sq. ft
GCp_posZ45[50] = 0.814601
GCp_negZ4[50] = -0.843068
GCp_negZ5[50] = -1.57227
# 100 sq. ft
GCp_posZ45[100] = 0.75
GCp_negZ4[100] = -0.8
GCp_negZ5[100] = -1.4
# 200 sq. ft
GCp_posZ45[200] = 0.685399
GCp_negZ4[200] = -0.756932
GCp_negZ5[200] = -1.22773
# 300 sq. ft
GCp_posZ45[300] = 0.647609
GCp_negZ4[300] = -0.731739
GCp_negZ5[300] = -1.12696
# 500 sq. ft
GCp_posZ45[500] = 0.6
GCp_negZ4[500] = -0.7
GCp_negZ5[500] = -1
# Effective Wind
# Area
# + Zone 4 & 5
# - Zone 4
# - Zone 5
# 20 sq. ft
P_posZ45[20] = 22.834 pounds_per_sq_foot
P_negZ4[20] = -41.2068 pounds_per_sq_foot
P_negZ5[20] = -75.5459 pounds_per_sq_foot
# 50 sq. ft
P_posZ45[50] = 21.319 pounds_per_sq_foot
P_negZ4[50] = -39.0346 pounds_per_sq_foot
P_negZ5[50] = -66.857 pounds_per_sq_foot
# 100 sq. ft
P_posZ45[100] = 20.173 pounds_per_sq_foot
P_negZ4[100] = -37.3914 pounds_per_sq_foot
P_negZ5[100] = -60.2841 pounds_per_sq_foot
# 200 sq. ft
P_posZ45[200] = 19.0269 pounds_per_sq_foot
P_negZ4[200] = -35.7482 pounds_per_sq_foot
P_negZ5[200] = -53.7112 pounds_per_sq_foot
# 300 sq. ft
P_posZ45[300] = 18.3565 pounds_per_sq_foot
P_negZ4[300] = -34.7869 pounds_per_sq_foot
P_negZ5[300] = -49.8663 pounds_per_sq_foot
# 500 sq. ft
P_posZ45[500] = 17.5119 pounds_per_sq_foot
P_negZ4[500] = -33.5759 pounds_per_sq_foot
P_negZ5[500] = -45.0223 pounds_per_sq_foot
# Corner Zone Dimensions, a
a := max(0.10*L, 3*ft) = 10 ft
