## Wind Loading for Components and Cladding
psf := 1.0
mph := 1.0
ft := 1.0
V := 98*mph
# Design According to NYC Building Code, based on ASCE7-05 for Walls w/ h<= 60ft
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z_gB := 1200
z_gC := 900
z_gD := 700
α_B := 7.0
α_C := 9.5
α_D := 11.5
# Basic Wind Speed
V = 98 mph  # (Section 1609.3)
# Mean Roof Height
h := 180*ft
# Roof angle
θ := 10*deg
h_1 := max(15, h)
h_2 := max(30, h)
h_3 := max(15, h)
# Building Category
Cat := "III"
# (Table 1604.5)
K_hB := 2.01*(h_2/z_gB)^(2/α_B) = 1.16894
K_hC := 2.01*(h_1/z_gC)^(2/α_C) = 1.43233
K_hD := 2.01*(h_3/z_gD)^(2/α_D) = 1.58715
I_w := if(Cat == "II", 1.0, 1.15)
# Exposure
Exp := "B"
# (Section 1609.4)
n_5 := if(θ ≤ 10*deg, 0.9, 1.0) = 0.9
# Enclosure Classification
Enc := "Enclosed"
# (Section 1609.2)
K_h := if(Exp == "B", K_hB, if(Exp == "C", K_hC, if(Exp == "D", K_hD, "Check Exp"))) = 1.16894
# Least Horizontal Dimension
L := 60*ft
GC_pi := if(Enc == "Enclosed", 0.18, if(Enc == "Open", 0.0, 0.55)) = 0.18
# Wind Importance Factor
I_w = 1.15  # (Table 1604.5.2)
# Wind Directionality Factor
EWA := 1 .. 1000
GCp5n_10 := -1.4
K_d := 0.85
GCp45_500 := 0.7
GCp4n_10 := -1.1
GCp4n_500 := -0.8
# (Section 6.5.4.4 & Table 6-4)
GCp45_10 := 1
GCp5n_500 := -0.8
# Velocity Pressure Coefficient
K_h = 1.16894  # (Section 6.5.6.6 & Table 6-3)
# Topographical Factor
K_zt := 1.0
# (Section 6.5.7.1)
GCp_posZ45[EWA] := n_5*if(EWA ≤ 10, GCp45_10, if(EWA ≥ 500, GCp45_500, GCp45_10 + (GCp45_500 - GCp45_10)*(log(EWA) - log(10))/(log(500) - log(10))))
# Velocity Pressure
q_h := 0.00256*K_h*K_zt*K_d*V^2*I_w = 28.0933 pounds_per_sq_foot
# (Eq. 6-15)
P_posZ45[EWA] := q_h*(GCp_posZ45[EWA] - (-GC_pi))
# Internal Pressure Coefficient
GC_pi = 0.18
# (Figure 6-5)
GCp_negZ4[EWA] := n_5*if(EWA ≤ 10, GCp4n_10, if(EWA ≥ 500, GCp4n_500, GCp4n_10 + (GCp4n_500 - GCp4n_10)*(log(EWA) - log(10))/(log(500) - log(10))))
# External Pressure Coefficient, GC_p
# Varies based on zone & eff. wind area
# (Figure 6-11A)
P_negZ4[EWA] := q_h*(GCp_negZ4[EWA] - GC_pi)
# Wind Pressure, P | P = q_h (GC_p - GC_pi) | (Eq. 6-22)
GCp_negZ5[EWA] := n_5*if(EWA ≤ 10, GCp5n_10, if(EWA ≥ 500, GCp5n_500, GCp5n_10 + (GCp5n_500 - GCp5n_10)*(log(EWA) - log(10))/(log(500) - log(10))))
# Note:  Wind Pressure Varies by Zone and Effective Wind Area.  See Charts Below. If the roof angle is less than 10 degrees, the GCp values were reduced by 10% per footnote 5 in figure 6-11A.
P_negZ5[EWA] := q_h*(GCp_negZ5[EWA] - GC_pi)
# Effective Wind
# Area
# + Zone 4 & 5
# - Zone 4
# - Zone 5
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# 10 sq. ft
GCp_posZ45[10] = 0.9
GCp_negZ4[10] = -0.99
GCp_negZ5[10] = -1.26
# 20 sq. ft
GCp_posZ45[20] = 0.85216
GCp_negZ4[20] = -0.94216
GCp_negZ5[20] = -1.16432
# 50 sq. ft
GCp_posZ45[50] = 0.78892
GCp_negZ4[50] = -0.87892
GCp_negZ5[50] = -1.03784
# 100 sq. ft
GCp_posZ45[100] = 0.74108
GCp_negZ4[100] = -0.83108
GCp_negZ5[100] = -0.94216
# 200 sq. ft
GCp_posZ45[200] = 0.693241
GCp_negZ4[200] = -0.783241
GCp_negZ5[200] = -0.846481
# 300 sq. ft
GCp_posZ45[300] = 0.665256
GCp_negZ4[300] = -0.755256
GCp_negZ5[300] = -0.790512  # REVISION HISTORY:
# 500 sq. ft
GCp_posZ45[500] = 0.63
GCp_negZ4[500] = -0.72
GCp_negZ5[500] = -0.72
# 1) Made by John who knows when (probably in prehistoric ages)
# 2) Reviewed by JC, 3/1/2017
# Effective Wind
# Area
# + Zone 4 & 5
# - Zone 4
# - Zone 5
# 10 sq. ft
P_posZ45[10] = 30.3407 pounds_per_sq_foot
P_negZ4[10] = -32.8691 pounds_per_sq_foot
P_negZ5[10] = -40.4543 pounds_per_sq_foot
# 20 sq. ft
P_posZ45[20] = 28.9968 pounds_per_sq_foot
P_negZ4[20] = -31.5252 pounds_per_sq_foot
P_negZ5[20] = -37.7664 pounds_per_sq_foot
# 50 sq. ft
P_posZ45[50] = 27.2201 pounds_per_sq_foot
P_negZ4[50] = -29.7485 pounds_per_sq_foot
P_negZ5[50] = -34.2131 pounds_per_sq_foot
# 100 sq. ft
P_posZ45[100] = 25.8762 pounds_per_sq_foot
P_negZ4[100] = -28.4046 pounds_per_sq_foot
P_negZ5[100] = -31.5252 pounds_per_sq_foot
# 200 sq. ft
P_posZ45[200] = 24.5322 pounds_per_sq_foot
P_negZ4[200] = -27.0606 pounds_per_sq_foot
P_negZ5[200] = -28.8372 pounds_per_sq_foot
# 300 sq. ft
P_posZ45[300] = 23.746 pounds_per_sq_foot
P_negZ4[300] = -26.2744 pounds_per_sq_foot
P_negZ5[300] = -27.2649 pounds_per_sq_foot
# 500 sq. ft
P_posZ45[500] = 22.7556 pounds_per_sq_foot
P_negZ4[500] = -25.284 pounds_per_sq_foot
P_negZ5[500] = -25.284 pounds_per_sq_foot
# Corner Zone Dimensions, a
a := max(min(0.1*L, 0.4*h), max(3, 0.04*L)) = 6 ft
