## #~~ Check Bolt Capacity
## (1) - 3/8"-16 Bolt, 18-8 Stainless Steel, Condition A, in 1/4" Thick HSS Wall, A500 Gr. B Steel
## Properties:
d_b~~ := 0.375*in
F_y~~ := 30*ksi
F_u~~ := 75 ksi
N_~~ := 16*1/in
LE_~~ := 0.233*in
F_us~~ := 58 ksi
F_nt~~ := min(0.75*F_y~~, 0.40*F_u~~) = 22.5 kips_per_sq_inch
F_nv~~ := min(0.75*F_y~~/sqrt(3), 0.40*F_u~~/sqrt(3)) = 12.9904 kips_per_sq_inch
A_S~~ := 0.7854*(d_b~~ - 0.9743/N_~~)^2 = 0.0774897 in^2
A_R~~ := 0.7854*(d_b~~ - 1.2269/N_~~)^2 = 0.0698959 in^2
# Demand
# Tension
T_~~ := 200*lbf
# Shear
V_~~ := 100*lbf
# Capacity
# Tension Capacity
T_n~~ := F_nt~~*A_S~~ = 1743.52 lbf
# Shear Capacity
V_n~~ := F_nv~~*A_R~~ = 907.975 lbf
# Screw Thread Capacity
SF_~~ := if(d_b~~ ≤ 0.25*in, 3.0, 2.5) = 2.5
TSA_E := 0.036*in^2
TSA_I := 0.052*in^2
SF_~~ = 2.5
T_~~ = 200 lbf
Conditions := if(LE_~~ ≤ 0.25*in, "Thin", if(0.25*in < LE_~~ < 0.375*in, "Transition", "Thick"))
# Required Engagement Length for Internal Thread
Conditions = "Thin"
# Thin
LE_I := (T_~~*SF_~~/(0.85*d_b~~*F_us~~)) = 0.0270453 in
LE_I~~ := (T_~~*SF_~~/(0.85*d_b~~*F_us~~)) = 0.0270453 in
# Thick
LE_I := (T_~~*SF_~~*sqrt(3)/(N_~~*TSA_I*F_us~~)) = 0.0179465 in
# Required Engagement Length for External Thread
LE_E~~ := max(T_~~*SF_~~*sqrt(3)/(N_~~*TSA_E*F_u~~), T_~~*sqrt(3)/(0.75*N_~~*TSA_E*F_y~~))
LE_E~~ = 0.0267292 in
# Required Engagement Lenght
LE_R~~ := max(LE_I~~, LE_E~~) = 0.0270453 in
# Provided Engagement Length
# Transition
P_E~~ := 0.85*d_b~~*0.25*F_us~~/SF_~~ = 1.84875 kip/in
LE_~~ = 0.233 in
CheckASD~~a := if(max(LE_I~~, LE_E~~) < LE_~~, "OK", "NG")
CheckASD~~a = "OK"
# Interaction
P_F~~ := 0.375*N_~~*TSA_I*F_us~~/(SF_~~*sqrt(3)) = 4.17909 kip/in
IR1_~~ := (T_~~/T_n~~)^2 + (V_~~/V_n~~)^2 = 0.0252883
LE_I := ((0.125*T_~~ - 0.375*in*P_E~~ + 0.25*in*P_F~~)/(P_F~~ - P_E~~)) = 0.161561 in
CheckASD~~b := if((T_~~/T_n~~)^2 + (V_~~/V_n~~)^2 < 1.00, "OK", "NG")
CheckASD~~b = "OK"
