# Calculation of Bending Stress
# Glass Thickness
t := 1.712 in
# Depth of fin
d := 15.9 in
# Span
L := 285 in
# Load
w := 175*lbf/ft
# Modulus of Elasticity
E := 10400000 psi
# Moment of Inertia
I := t*d^3/12 = 573.474 in^4
# Moment in Glass
M_g := w*L^2/8 = 148.066 kip*in
# Stress in Glass
σ := (M_g*(d/2))/I = 2052.63 psi
