# Calculation of the Total Reaction Force due to Drift Load
# Figures
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# Dimensions of glass (fig1) | Constants (Do not change)
x_glass := 4.4375 ft
a := ft^-1
y_glass := 6.4271 ft
# Ground Snow Load
p_g := 30 psf
# Mass density of snow
γ_snow := 0.13*p_g*a + 14 pcf = 17.9 pounds_per_cubic_foot
# Drift Snow Loads (fig2)
pf_1 := 20 psf
pf_2 := 10 psf
# Height of the accumulated snow (fig2)
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hb_1 := pf_1/γ_snow = 1.11732 ft
hb_2 := pf_2/γ_snow = 0.558659 ft
# Load due to Uniform Snow Load
V1 := x_glass*y_glass*hb_1*γ_snow = 570.405 lbf
V2 := x_glass*y_glass*hb_2*γ_snow*0.5 = 142.601 lbf
# Total force exerted by Snow due to snow drift
V_t := V1 + V2 = 713.006 lbf
