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glass_weight := 13.2*psf/in = 0.0916667 lbf/in^3
x := 6 ft
y := 6 ft
z := 3/8*in + 0.06 in + 3/8*in = 0.81 in
DL := glass_weight*x*y*z = 0.384912 kip
DL = 384.912 lbf
DL = 1712.17 N
θ_incln := 1.0876 deg
DL_normal := DL*sin(θ_incln) = 7.30604 lbf
# Divide the DL_normal by Area of the fin face to get pressure load for Abaqus
DL_Abaqus := DL_normal/(x*y) = 0.202946 pounds_per_sq_foot
