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glass_weight := 13.2*psf/in = 0.0916667 lbf/in^3
x := 47 in
y := 83 in
z := 1.06 in
DL := glass_weight*x*y*z = 0.379047 kip
DL = 379.047 lbf
θ_incln := 90 deg
DL_normal := DL*sin(θ_incln) = 379.047 lbf
# Divide the DL_normal by Area of the fin face to get pressure load for Abaqus
DL_Abaqus := DL_normal/(x*y) = 13.992 pounds_per_sq_foot
