F := 1
C := 1
% := 1
# Calculation of dew point using Temperature and Relative Humidity
T_f := 50*F  # Temperature in Fahrenheit
a := 17.271  # Constant
b := 237.7  # Constant
T := (T_f - 32)*5/9 = 10 C  # Temperature in Celsius
RH := 20*%  # Relative Humidity
γ := a*T/(b + T) + ln(RH/100)
T_d := b*γ/(a - γ)  # Dew point temperature in Celsius
T_d = -11.9245 C
T_d*9/5 + 32*F = 10.5358 F  # Dew point in Fahrenheit
