# #4 Check Rotule Capacity due to Horizontal Earthquake Load
DL_glass := 1000 N = 224.809 lbf
EL_horizontal := 0.33*DL_glass = 74.187 lbf
num_rotules := 4
# This horizontal Earthquake load is shared by four rotules. Thus reaction at each rotule is
R_horizontal := EL_horizontal/num_rotules = 18.5467 lbf
Rotule_Horizontal_capacity := 2500 N = 562.022 lbf  # (for capacity refer kin long catalog)
Int_horizontal := R_horizontal/Rotule_Horizontal_capacity = 0.033
CheckEL_hor := if(Int_horizontal < 1.00, "OK", "NG")
CheckEL_hor = "OK"
