# Silicone Bite Design for Horizontal Earthquake Load
DL_glass := 13.2*psf/in*((5/16)*in + 2*(3/8)*in + 0.06 in) = 14.817 pounds_per_sq_foot
Area_glass := (7 ft + 6 in)*(3 ft + 6 in) = 26.25 ft^2
Force_equake := 1.845*DL_glass*Area_glass = 717.606 lbf
# Calculation of the Stress in Silicone
Perimeter_glass := 2*(7 ft + 6 in) + 2*(3 ft + 6 in) = 264 in
Bite_silicone := 0.25 in
Total_area_silicone_cs := Perimeter_glass*Bite_silicone = 66 in^2
σ_silicone := Force_equake/Total_area_silicone_cs = 10.8728 psi
