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glass_weight := 13.2*psf/in = 0.0916667 lbf/in^3
x := 26 in
y := 554 in
z := 2.18 in
DL := glass_weight*x*y*z = 2.8784 kip
DL = 2878.4 lbf
θ_incln := 1.0876 deg
DL_normal := DL*sin(θ_incln) = 54.6351 lbf
# Divide the DL_normal by Area of the fin face to get pressure load for Abaqus
DL_Abaqus := DL_normal/(x*y) = 0.546199 pounds_per_sq_foot
