# Calculating the frequency of vibration of a prestressed cable
# Explanation of the variables
# L=Length of string (in)
# T=Tension in the string (psi)
# μ=Linear density of string (lb/in)
# m=mass of string (lb)
# n=number of harmonic (n=1 corresponds to the fundamental freq)
# INPUTS
L := 1*in
T := 100*lbf
m := 1*lb
n := 1
# Calcuate the linear density
# Calcuate the frequency
