# Back Calculaiton of the thermal conductivity of aerogel
t_glass := 0.25 in
λ_glass := 1*W/(m*K)
t_gap := 2.5 in
λ_aerogel := 0.020125*W/(m*K)
R_glass := t_glass/λ_glass = 0.00635 m^2*K/W
R_aerogel := t_gap/λ_aerogel = 3.15528 m^2*K/W
R_eff := (R_glass + R_aerogel + R_glass) = 3.16798 m^2*K/W
# The effective U-value is
U_glass := 1/R_glass = 157.48 W/(m^2*K)
U_aerogel := 1/R_aerogel = 0.316929 W/(m^2*K)
U_eff := 1/R_eff = 0.315659 W/(m^2*K)
# Thus the thermal conductivity of Aerogel material is λ_aerogel = 0.0201 W/mK
1/0.0556504587641 = 17.9693
