# INPUTS
SL_drift := 62.5 psf
SL_uni := 21 psf
w := 9.615 ft
length_canopy := 60.5 in
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# Calculation
x_1 := length_canopy
x_L := w
y_L := SL_drift
y_1 := (1 - x_1/x_L)*y_L = 29.7279 pounds_per_sq_foot
# Final Snow Loads
SL_drift_end_of_canopy := SL_uni + y_1 = 50.7279 pounds_per_sq_foot
SL_max_drift := SL_drift = 62.5 pounds_per_sq_foot
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SL_drift_end_of_canopy = 0.00242886 MPa
SL_max_drift = 0.00299252 MPa
